# OpenSim document version 40000
ScaleTool FullBodyModel_MuscleActuatedLowerLimb_TorqueActuatedUpperBody-scaled:
  mass: 75.337 [kg]
  height: -1
  age: -1
  ModelScaler:
    apply: true
    scaling_order: measurements
    marker_file: transformed_SN001_static.trc
    time_range: 0 0.065
    preserve_mass_distribution: true
    MeasurementSet:
      Measurement PelvisZ: apply=true
        MarkerPair: markers=(RASIS LASIS)
        MarkerPair: markers=(LPSIS RPSIS)
        BodyScale pelvis: axes=Z
      Measurement PelvisY: apply=true
        MarkerPair: markers=(RASIS RICR)
        MarkerPair: markers=(LASIS LICR)
        MarkerPair: markers=(LPSIS LICR)
        MarkerPair: markers=(RPSIS RICR)
        BodyScale pelvis: axes=Y
      Measurement PelvisX: apply=true
        MarkerPair: markers=(RASIS RPSIS)
        MarkerPair: markers=(LASIS LPSIS)
        BodyScale pelvis: axes=X
      Measurement FemurY: apply=true
        MarkerPair: markers=(RFLE RTH4)
        MarkerPair: markers=(RFLE RTH3)
        MarkerPair: markers=(LFLE LTH4)
        MarkerPair: markers=(LFLE LTH3)
        BodyScale femur_r: axes=Y
        BodyScale femur_l: axes=Y
      Measurement FemurZ: apply=true
        MarkerPair: markers=(RFLE RFME)
        MarkerPair: markers=(LFLE LFME)
        BodyScale femur_r: axes=Z
        BodyScale femur_l: axes=Z
      Measurement TibiaY: apply=true
        MarkerPair: markers=(RFLE RFAL)
        MarkerPair: markers=(RFME RTAM)
        MarkerPair: markers=(LFLE LFAL)
        MarkerPair: markers=(LFME LTAM)
        BodyScale tibia_r: axes=Y
        BodyScale tibia_l: axes=Y
      Measurement TibiaZ: apply=true
        MarkerPair: markers=(LFAL LTAM)
        MarkerPair: markers=(RFAL RTAM)
        BodyScale tibia_r: axes=Z
        BodyScale tibia_l: axes=Z
      Measurement TorsoX: apply=true
        MarkerPair: markers=(C7 STER)
        MarkerPair: markers=(T10 STER)
        BodyScale torso: axes=X
      Measurement TorsoY: apply=true
        MarkerPair: markers=(C7 T4)
        MarkerPair: markers=(T4 T8)
        MarkerPair: markers=(T8 T10)
        BodyScale torso: axes=Y
      Measurement TorsoZ: apply=true
        MarkerPair: markers=(C7 RACR)
        MarkerPair: markers=(C7 LACR)
        MarkerPair: markers=(STER RACR)
        MarkerPair: markers=(STER LACR)
        BodyScale torso: axes=Z
      Measurement HumerusY: apply=true
        MarkerPair: markers=(LACR LHLE)
        MarkerPair: markers=(LACR LHME)
        MarkerPair: markers=(RACR RHLE)
        MarkerPair: markers=(RACR RHME)
        BodyScale humerus_r: axes=Y
        BodyScale humerus_l: axes=Y
      Measurement HumerusXZ: apply=true
        MarkerPair: markers=(LHME LHLE)
        MarkerPair: markers=(RHME RHLE)
        BodyScale humerus_r: axes=(X Z)
        BodyScale humerus_l: axes=(X Z)
      Measurement RadiusY: apply=true
        MarkerPair: markers=(LHLE LRSP)
        MarkerPair: markers=(RHLE RRSP)
        BodyScale radius_r: axes=Y
        BodyScale radius_l: axes=Y
      Measurement ForearmXZ: apply=true
        MarkerPair: markers=(LRSP LUSP)
        MarkerPair: markers=(RRSP RUSP)
        BodyScale ulna_r: axes=(X Z)
        BodyScale radius_r: axes=(X Z)
        BodyScale ulna_l: axes=(X Z)
        BodyScale radius_l: axes=(X Z)
      Measurement UlnaY: apply=true
        MarkerPair: markers=(LHME LUSP)
        MarkerPair: markers=(RHME RUSP)
        BodyScale ulna_r: axes=Y
        BodyScale ulna_l: axes=Y
      Measurement FootX: apply=true
        MarkerPair: markers=(LFCC LFMT1)
        MarkerPair: markers=(LFCC LFMT5)
        MarkerPair: markers=(RFCC RFMT1)
        MarkerPair: markers=(RFCC RFMT5)
        BodyScale talus_r: axes=X
        BodyScale calcn_r: axes=X
        BodyScale toes_r: axes=X
        BodyScale talus_l: axes=X
        BodyScale calcn_l: axes=X
        BodyScale toes_l: axes=X
      Measurement FootY: apply=true
        MarkerPair: markers=(LFCC LFAL)
        MarkerPair: markers=(LFCC LTAM)
        MarkerPair: markers=(RFCC RFAL)
        MarkerPair: markers=(RFCC RTAM)
        BodyScale talus_r: axes=Y
        BodyScale calcn_r: axes=Y
        BodyScale toes_r: axes=Y
        BodyScale talus_l: axes=Y
        BodyScale calcn_l: axes=Y
        BodyScale toes_l: axes=Y
      Measurement FootZ: apply=true
        MarkerPair: markers=(LFMT1 LFMT5)
        MarkerPair: markers=(RFMT1 RFMT5)
        BodyScale talus_r: axes=Z
        BodyScale calcn_r: axes=Z
        BodyScale toes_r: axes=Z
        BodyScale talus_l: axes=Z
        BodyScale calcn_l: axes=Z
        BodyScale toes_l: axes=Z
  MarkerPlacer:
    apply: true
    marker_file: transformed_SN001_static.trc
    time_range: 0 0.065
    max_marker_movement: -1
    IKTaskSet:
      IKMarkerTask RACR: apply=true weight=1
      IKMarkerTask LACR: apply=true weight=1
      IKMarkerTask C7: apply=true weight=1
      IKMarkerTask STER: apply=true weight=1
      IKMarkerTask RUA1: apply=true weight=1
      IKMarkerTask RUA2: apply=true weight=1
      IKMarkerTask RUA3: apply=true weight=1
      IKMarkerTask RFA1: apply=true weight=1
      IKMarkerTask RRSP: apply=true weight=1
      IKMarkerTask RUSP: apply=true weight=1
      IKMarkerTask LUA1: apply=true weight=1
      IKMarkerTask LUA4: apply=true weight=1
      IKMarkerTask LUA3: apply=true weight=1
      IKMarkerTask LHLE: apply=true weight=1
      IKMarkerTask LFA1: apply=true weight=1
      IKMarkerTask LRSP: apply=true weight=1
      IKMarkerTask LUSP: apply=true weight=1
      IKMarkerTask RASIS: apply=true weight=1
      IKMarkerTask LASIS: apply=true weight=1
      IKMarkerTask RPSIS: apply=true weight=1
      IKMarkerTask LPSIS: apply=true weight=1
      IKMarkerTask RTH1: apply=true weight=1
      IKMarkerTask RTH2: apply=true weight=1
      IKMarkerTask RTH3: apply=true weight=1
      IKMarkerTask RFLE: apply=true weight=1
      IKMarkerTask RFME: apply=true weight=1
      IKMarkerTask RSK1: apply=true weight=1
      IKMarkerTask RSK2: apply=true weight=1
      IKMarkerTask RSK4: apply=true weight=1
      IKMarkerTask RFAL: apply=true weight=1
      IKMarkerTask RTAM: apply=true weight=1
      IKMarkerTask RFCC: apply=true weight=1
      IKMarkerTask LTH1: apply=true weight=1
      IKMarkerTask LTH2: apply=true weight=1
      IKMarkerTask LTH3: apply=true weight=1
      IKMarkerTask LFLE: apply=true weight=1
      IKMarkerTask LFME: apply=true weight=1
      IKMarkerTask LSK1: apply=true weight=1
      IKMarkerTask LSK2: apply=true weight=1
      IKMarkerTask LSK3: apply=true weight=1
      IKMarkerTask LFAL: apply=true weight=1
      IKMarkerTask LTAM: apply=true weight=1
      IKMarkerTask LFCC: apply=true weight=1
      IKMarkerTask XPRO: apply=true weight=1
      IKMarkerTask T4: apply=true weight=1
      IKMarkerTask T8: apply=true weight=1
      IKMarkerTask T10: apply=true weight=1
      IKMarkerTask RHME: apply=true weight=1
      IKMarkerTask RHLE: apply=true weight=1
      IKMarkerTask LHME: apply=true weight=1
      IKMarkerTask RTEMP: apply=true weight=1
      IKMarkerTask LTEMP: apply=true weight=1
      IKMarkerTask RHEAD: apply=true weight=1
      IKMarkerTask LHEAD: apply=true weight=1
      IKMarkerTask RICR: apply=true weight=1
      IKMarkerTask LICR: apply=true weight=1
      IKMarkerTask LUA2: apply=true weight=1
      IKMarkerTask RUA4: apply=true weight=1
      IKMarkerTask LFA2: apply=true weight=1
      IKMarkerTask LFA3: apply=true weight=1
      IKMarkerTask RFA2: apply=true weight=1
      IKMarkerTask RFA3: apply=true weight=1
      IKMarkerTask RTH4: apply=true weight=1
      IKMarkerTask LTH4: apply=true weight=1
      IKMarkerTask RSK3: apply=true weight=1
      IKMarkerTask LSK4: apply=true weight=1
