# OpenSim document version 40000
Model Rajapogal_FullBody_calibrated:
  gravity: 0 -9.80665 0
  length_units: meters
  force_units: N
  credits:
    Rajagopal, A, Dembia, C.L., DeMers, M.S., Delp, D.D., Hicks, J.L., and Delp, S.L.
  publications:
    Rajagopal, Apoorva, et al. "Full-Body Musculoskeletal Model for Muscle-Driven Simulation of Human Gait." IEEE Transactions on Biomedical Engineering 63.10 (2016): 2068-2079. (2016)
  Ground
  BodySet:
    Body pelvis: mass=11.777 mass_center=(-0.0707 0 0) inertia=(0.1028 0.0871 0.0579 0 0 0)
        meshes=(r_pelvis.vtp l_pelvis.vtp sacrum.vtp)
      WrapCylinder Gmax1_at_pelvis_r: xyz_body_rotation=(-0.6 0.45 0) translation=(-0.077 -0.099 0.061) quadrant=-x
          radius=0.04 length=0.15
      WrapCylinder Gmax2_at_pelvis_r: xyz_body_rotation=(-0.75 0.39 0) translation=(-0.08 -0.083 0.068) quadrant=all
          radius=0.04 length=0.1
      WrapCylinder Gmax3_at_pelvis_r: xyz_body_rotation=(-0.1 0 0) translation=(-0.083 -0.088 0.068) quadrant=all
          radius=0.04 length=0.1
      WrapCylinder Gmax1_at_pelvis_l: xyz_body_rotation=(0.6 -0.45 0) translation=(-0.077 -0.099 -0.061) quadrant=-x
          radius=0.04 length=0.15
      WrapCylinder Gmax2_at_pelvis_l: xyz_body_rotation=(0.75 -0.39 0) translation=(-0.08 -0.083 -0.068) quadrant=all
          radius=0.04 length=0.1
      WrapCylinder Gmax3_at_pelvis_l: xyz_body_rotation=(0.1 0 0) translation=(-0.083 -0.088 -0.068) quadrant=all
          radius=0.04 length=0.1
      WrapCylinder PS_at_brim_r: xyz_body_rotation=(-0.25 -0.27 0.1) translation=(-0.074 -0.06 0.0656) quadrant=-y
          radius=0.05 length=0.1
      WrapCylinder PS_at_brim_l: xyz_body_rotation=(0.25 0.27 0.1) translation=(-0.074 -0.06 -0.0656) quadrant=-y
          radius=0.05 length=0.1
      WrapCylinder IL_at_brim_r: xyz_body_rotation=(-0.32 -0.24 0.9) translation=(-0.071 -0.065 0.0756) quadrant=-y
          radius=0.0549 length=0.1
      WrapCylinder IL_at_brim_l: xyz_body_rotation=(0.32 0.24 0.9) translation=(-0.071 -0.065 -0.0756) quadrant=-y
          radius=0.0549 length=0.1
    Body femur_r: mass=9.3014 mass_center=(0 -0.17 0) inertia=(0.1339 0.0351 0.1412 0 0 0) meshes=femur_r.vtp
      WrapCylinder Gastroc_at_condyles_r: translation=(0.005 -0.41 0) quadrant=all radius=0.025 length=0.1
      WrapCylinder KnExt_at_fem_r: xyz_body_rotation=(-0.0623366 0.0507601 0)
          translation=(0.00358828 -0.402732 0.00209111) quadrant=all radius=0.025 length=0.1
      WrapCylinder AB_at_femshaft_r: xyz_body_rotation=(1.66157 0.186644 0) translation=(0.0146434 -0.112595 0.023365)
          quadrant=all radius=0.0165 length=0.07
      WrapCylinder AL_at_femshaft_r: xyz_body_rotation=(1.77711 0.136489 0) translation=(0.0307327 -0.231909 0.0151137)
          quadrant=all radius=0.0201 length=0.1
      WrapCylinder AMprox_at_femshaft_r: xyz_body_rotation=(1.61126 0.18656 0)
          translation=(0.00518299 -0.0728948 0.025403) quadrant=all radius=0.0211 length=0.07
      WrapCylinder AMmid_at_femshaft_r: xyz_body_rotation=(1.61139 0.13656 0)
          translation=(0.0230125 -0.160711 0.0205842) quadrant=all radius=0.0214 length=0.12
      WrapCylinder AMdist_at_femshaft_r: xyz_body_rotation=(1.71188 0.186636 0)
          translation=(0.0316065 -0.260736 0.0093646) quadrant=all radius=0.0218 length=0.2
      WrapCylinder AMisch_at_condyles_r: xyz_body_rotation=(1.71115 -0.463363 0)
          translation=(-0.0226511 -0.376831 -0.00315437) quadrant=all radius=0.04 length=0.24
      WrapCylinder PECT_at_femshaft_r: xyz_body_rotation=(1.81295 0.276344 0)
          translation=(0.00608573 -0.0845029 0.0304405) quadrant=all radius=0.015 length=0.05
    Body tibia_r: mass=3.7075 mass_center=(0 -0.1867 0) inertia=(0.0504 0.0051 0.0511 0 0 0)
        meshes=(tibia_r.vtp r_fibula.vtp)
      WrapCylinder GasLat_at_shank_r: xyz_body_rotation=(2.96723 -0.279725 -1.47812)
          translation=(-0.0074 -0.074 -0.0033) quadrant=-y radius=0.055 length=0.1
      WrapCylinder GasMed_at_shank_r: xyz_body_rotation=(2.96723 0.0279725 -1.47812)
          translation=(-0.0074 -0.074 -0.0033) quadrant=-y radius=0.055 length=0.1
      WrapCylinder GR_at_condyles_r: xyz_body_rotation=(0 -0.4 0) translation=(-0.003 -0.02 0) quadrant=all
          radius=0.036 length=0.1
      WrapCylinder SM_at_condyles_r: xyz_body_rotation=(0 -0.1 0) translation=(-0.001 -0.02 0) quadrant=all
          radius=0.0352 length=0.1
      WrapCylinder ST_at_condyles_r: xyz_body_rotation=(0 -0.2 0) translation=(-0.002 -0.0205 0) quadrant=all
          radius=0.0425 length=0.1
      WrapCylinder BF_at_gastroc_r: translation=(-0.058 -0.06 0) quadrant=y radius=0.03 length=0.15
    Body patella_r: mass=0.0862 mass_center=(0.0018 0.0264 0) inertia=(2.87e-6 1.311e-5 1.311e-5 0 0 0)
        meshes=r_patella.vtp
    Body talus_r: mass=0.1 mass_center=(0 0 0) inertia=(0.001 0.001 0.001 0 0 0) meshes=r_talus.vtp
    Body calcn_r: mass=1.25 mass_center=(0.1 0.03 0) inertia=(0.0014 0.0039 0.0041 0 0 0) meshes=r_foot.vtp
    Body toes_r: mass=0.2166 mass_center=(0.0346 0.006 -0.0175) inertia=(0.0001 0.0002 0.001 0 0 0) meshes=r_bofoot.vtp
    Body femur_l: mass=9.3014 mass_center=(0 -0.17 0) inertia=(0.1339 0.0351 0.1412 0 0 0) meshes=femur_l.vtp
      WrapCylinder Gastroc_at_condyles_l: translation=(0.005 -0.41 0) quadrant=all radius=0.025 length=0.1
      WrapCylinder KnExt_at_fem_l: xyz_body_rotation=(0.0623366 -0.0507601 0)
          translation=(0.00358828 -0.402732 -0.00209111) quadrant=all radius=0.025 length=0.1
      WrapCylinder AB_at_femshaft_l: xyz_body_rotation=(-1.66157 -0.186644 0)
          translation=(0.0146434 -0.112595 -0.023365) quadrant=all radius=0.0165 length=0.07
      WrapCylinder AL_at_femshaft_l: xyz_body_rotation=(-1.77711 -0.136489 0)
          translation=(0.0307327 -0.231909 -0.0151137) quadrant=all radius=0.0201 length=0.1
      WrapCylinder AMprox_at_femshaft_l: xyz_body_rotation=(-1.61126 -0.18656 0)
          translation=(0.00518299 -0.0728948 -0.025403) quadrant=all radius=0.0211 length=0.07
      WrapCylinder AMmid_at_femshaft_l: xyz_body_rotation=(-1.61139 -0.13656 0)
          translation=(0.0230125 -0.160711 -0.0205842) quadrant=all radius=0.0214 length=0.12
      WrapCylinder AMdist_at_femshaft_l: xyz_body_rotation=(-1.71188 -0.186636 0)
          translation=(0.0316065 -0.260736 -0.0093646) quadrant=all radius=0.0218 length=0.2
      WrapCylinder AMisch_at_condyles_l: xyz_body_rotation=(-1.71115 0.463363 0)
          translation=(-0.0226511 -0.376831 0.00315437) quadrant=all radius=0.04 length=0.24
      WrapCylinder PECT_at_femshaft_l: xyz_body_rotation=(-1.81295 -0.276344 0)
          translation=(0.00608573 -0.0845029 -0.0304405) quadrant=all radius=0.015 length=0.05
    Body tibia_l: mass=3.7075 mass_center=(0 -0.1867 0) inertia=(0.0504 0.0051 0.0511 0 0 0)
        meshes=(tibia_l.vtp l_fibula.vtp)
      WrapCylinder GasLat_at_shank_l: xyz_body_rotation=(-2.96723 0.279725 -1.47812)
          translation=(-0.0074 -0.074 0.0033) quadrant=-y radius=0.055 length=0.1
      WrapCylinder GasMed_at_shank_l: xyz_body_rotation=(-2.96723 -0.0279725 -1.47812)
          translation=(-0.0074 -0.074 0.0033) quadrant=-y radius=0.055 length=0.1
      WrapCylinder GR_at_condyles_l: xyz_body_rotation=(0 0.4 0) translation=(-0.003 -0.02 0) quadrant=all radius=0.036
          length=0.1
      WrapCylinder SM_at_condyles_l: xyz_body_rotation=(0 0.1 0) translation=(-0.001 -0.02 0) quadrant=all
          radius=0.0352 length=0.1
      WrapCylinder ST_at_condyles_l: xyz_body_rotation=(0 0.2 0) translation=(-0.002 -0.0205 0) quadrant=all
          radius=0.0425 length=0.1
      WrapCylinder BF_at_gastroc_l: translation=(-0.058 -0.06 0) quadrant=all radius=0.03 length=0.15
    Body patella_l: mass=0.0862 mass_center=(0.0018 0.0264 0) inertia=(2.87e-6 1.311e-5 1.311e-5 0 0 0)
        meshes=l_patella.vtp
    Body talus_l: mass=0.1 mass_center=(0 0 0) inertia=(0.001 0.001 0.001 0 0 0) meshes=l_talus.vtp
    Body calcn_l: mass=1.25 mass_center=(0.1 0.03 0) inertia=(0.0014 0.0039 0.0041 0 0 0) meshes=l_foot.vtp
    Body toes_l: mass=0.2166 mass_center=(0.0346 0.006 0.0175) inertia=(0.0001 0.0002 0.001 0 0 0) meshes=l_bofoot.vtp
    Body torso: mass=26.8266 mass_center=(-0.03 0.32 0) inertia=(1.4745 0.7555 1.4314 0 0 0)
        meshes=(hat_spine.vtp hat_jaw.vtp hat_skull.vtp hat_ribs_scap.vtp)
    Body humerus_r: mass=2.0325 mass_center=(0 -0.164502 0) inertia=(0.011946 0.004121 0.013409 0 0 0)
        meshes=humerus_rv.vtp
      PhysicalOffsetFrame humerus_r_imu: socket_parent=.. translation=(-0.03 -0.12 0) orientation=(0 1.57 1.57)
      PhysicalOffsetFrame humerus_r_imu2_0deg_frame: socket_parent=.. translation=(-0.03173992 -0.12 -0.04368727)
          orientation=(0 3.7699 1.57)
      PhysicalOffsetFrame humerus_r_imu2_30deg_frame: socket_parent=.. translation=(-0.03173992 -0.12 -0.04368727)
          orientation=(0 3.7699 2.093599)
      PhysicalOffsetFrame humerus_r_imu2_-30deg_frame: socket_parent=.. translation=(-0.03173992 -0.12 -0.04368727)
          orientation=(0 3.7699 1.046401)
      PhysicalOffsetFrame humerus_r_imu3_0deg_frame: socket_parent=.. translation=(-0.05135656 -0.12 -0.01668844)
          orientation=(0 4.3982 1.57)
      PhysicalOffsetFrame humerus_r_imu3_30deg_frame: socket_parent=.. translation=(-0.05135656 -0.12 -0.01668844)
          orientation=(0 4.3982 2.093599)
      PhysicalOffsetFrame humerus_r_imu3_-30deg_frame: socket_parent=.. translation=(-0.05135656 -0.12 -0.01668844)
          orientation=(0 4.3982 1.046401)
      PhysicalOffsetFrame humerus_r_imu4_0deg_frame: socket_parent=.. translation=(-0.05135786 -0.12 0.01668444)
          orientation=(0 5.0265 1.57)
      PhysicalOffsetFrame humerus_r_imu4_30deg_frame: socket_parent=.. translation=(-0.05135786 -0.12 0.01668444)
          orientation=(0 5.0265 2.093599)
      PhysicalOffsetFrame humerus_r_imu4_-30deg_frame: socket_parent=.. translation=(-0.05135786 -0.12 0.01668444)
          orientation=(0 5.0265 1.046401)
      PhysicalOffsetFrame humerus_r_imu5_0deg_frame: socket_parent=.. translation=(-0.03173895 -0.12 0.04368797)
          orientation=(0 5.6549 1.57)
      PhysicalOffsetFrame humerus_r_imu5_30deg_frame: socket_parent=.. translation=(-0.03173895 -0.12 0.04368797)
          orientation=(0 5.6549 2.093599)
      PhysicalOffsetFrame humerus_r_imu5_-30deg_frame: socket_parent=.. translation=(-0.03173895 -0.12 0.04368797)
          orientation=(0 5.6549 1.046401)
      PhysicalOffsetFrame humerus_r_imu6_0deg_frame: socket_parent=.. translation=(7.934123e-7 -0.12 0.054)
          orientation=(0 6.2832 1.57)
      PhysicalOffsetFrame humerus_r_imu6_30deg_frame: socket_parent=.. translation=(7.934123e-7 -0.12 0.054)
          orientation=(0 6.2832 2.093599)
      PhysicalOffsetFrame humerus_r_imu6_-30deg_frame: socket_parent=.. translation=(7.934123e-7 -0.12 0.054)
          orientation=(0 6.2832 1.046401)
      PhysicalOffsetFrame humerus_r_imu7_0deg_frame: socket_parent=.. translation=(-0.03173992 -0.095 -0.04368727)
          orientation=(0 3.7699 1.57)
      PhysicalOffsetFrame humerus_r_imu7_30deg_frame: socket_parent=.. translation=(-0.03173992 -0.095 -0.04368727)
          orientation=(0 3.7699 2.093599)
      PhysicalOffsetFrame humerus_r_imu7_-30deg_frame: socket_parent=.. translation=(-0.03173992 -0.095 -0.04368727)
          orientation=(0 3.7699 1.046401)
      PhysicalOffsetFrame humerus_r_imu8_0deg_frame: socket_parent=.. translation=(-0.05135656 -0.095 -0.01668844)
          orientation=(0 4.3982 1.57)
      PhysicalOffsetFrame humerus_r_imu8_30deg_frame: socket_parent=.. translation=(-0.05135656 -0.095 -0.01668844)
          orientation=(0 4.3982 2.093599)
      PhysicalOffsetFrame humerus_r_imu8_-30deg_frame: socket_parent=.. translation=(-0.05135656 -0.095 -0.01668844)
          orientation=(0 4.3982 1.046401)
      PhysicalOffsetFrame humerus_r_imu9_0deg_frame: socket_parent=.. translation=(-0.05135786 -0.095 0.01668444)
          orientation=(0 5.0265 1.57)
      PhysicalOffsetFrame humerus_r_imu9_30deg_frame: socket_parent=.. translation=(-0.05135786 -0.095 0.01668444)
          orientation=(0 5.0265 2.093599)
      PhysicalOffsetFrame humerus_r_imu9_-30deg_frame: socket_parent=.. translation=(-0.05135786 -0.095 0.01668444)
          orientation=(0 5.0265 1.046401)
      PhysicalOffsetFrame humerus_r_imu10_0deg_frame: socket_parent=.. translation=(-0.03173895 -0.095 0.04368797)
          orientation=(0 5.6549 1.57)
      PhysicalOffsetFrame humerus_r_imu10_30deg_frame: socket_parent=.. translation=(-0.03173895 -0.095 0.04368797)
          orientation=(0 5.6549 2.093599)
      PhysicalOffsetFrame humerus_r_imu10_-30deg_frame: socket_parent=.. translation=(-0.03173895 -0.095 0.04368797)
          orientation=(0 5.6549 1.046401)
      PhysicalOffsetFrame humerus_r_imu11_0deg_frame: socket_parent=.. translation=(7.934123e-7 -0.095 0.054)
          orientation=(0 6.2832 1.57)
      PhysicalOffsetFrame humerus_r_imu11_30deg_frame: socket_parent=.. translation=(7.934123e-7 -0.095 0.054)
          orientation=(0 6.2832 2.093599)
      PhysicalOffsetFrame humerus_r_imu11_-30deg_frame: socket_parent=.. translation=(7.934123e-7 -0.095 0.054)
          orientation=(0 6.2832 1.046401)
      PhysicalOffsetFrame humerus_r_imu12_0deg_frame: socket_parent=.. translation=(-0.03173992 -0.145 -0.04368727)
          orientation=(0 3.7699 1.57)
      PhysicalOffsetFrame humerus_r_imu12_30deg_frame: socket_parent=.. translation=(-0.03173992 -0.145 -0.04368727)
          orientation=(0 3.7699 2.093599)
      PhysicalOffsetFrame humerus_r_imu12_-30deg_frame: socket_parent=.. translation=(-0.03173992 -0.145 -0.04368727)
          orientation=(0 3.7699 1.046401)
      PhysicalOffsetFrame humerus_r_imu13_0deg_frame: socket_parent=.. translation=(-0.05135656 -0.145 -0.01668844)
          orientation=(0 4.3982 1.57)
      PhysicalOffsetFrame humerus_r_imu13_30deg_frame: socket_parent=.. translation=(-0.05135656 -0.145 -0.01668844)
          orientation=(0 4.3982 2.093599)
      PhysicalOffsetFrame humerus_r_imu13_-30deg_frame: socket_parent=.. translation=(-0.05135656 -0.145 -0.01668844)
          orientation=(0 4.3982 1.046401)
      PhysicalOffsetFrame humerus_r_imu14_0deg_frame: socket_parent=.. translation=(-0.05135786 -0.145 0.01668444)
          orientation=(0 5.0265 1.57)
      PhysicalOffsetFrame humerus_r_imu14_30deg_frame: socket_parent=.. translation=(-0.05135786 -0.145 0.01668444)
          orientation=(0 5.0265 2.093599)
      PhysicalOffsetFrame humerus_r_imu14_-30deg_frame: socket_parent=.. translation=(-0.05135786 -0.145 0.01668444)
          orientation=(0 5.0265 1.046401)
      PhysicalOffsetFrame humerus_r_imu15_0deg_frame: socket_parent=.. translation=(-0.03173895 -0.145 0.04368797)
          orientation=(0 5.6549 1.57)
      PhysicalOffsetFrame humerus_r_imu15_30deg_frame: socket_parent=.. translation=(-0.03173895 -0.145 0.04368797)
          orientation=(0 5.6549 2.093599)
      PhysicalOffsetFrame humerus_r_imu15_-30deg_frame: socket_parent=.. translation=(-0.03173895 -0.145 0.04368797)
          orientation=(0 5.6549 1.046401)
      PhysicalOffsetFrame humerus_r_imu16_0deg_frame: socket_parent=.. translation=(7.934123e-7 -0.145 0.054)
          orientation=(0 6.2832 1.57)
      PhysicalOffsetFrame humerus_r_imu16_30deg_frame: socket_parent=.. translation=(7.934123e-7 -0.145 0.054)
          orientation=(0 6.2832 2.093599)
      PhysicalOffsetFrame humerus_r_imu16_-30deg_frame: socket_parent=.. translation=(7.934123e-7 -0.145 0.054)
          orientation=(0 6.2832 1.046401)
      PhysicalOffsetFrame humerus_r_imu17_0deg_frame: socket_parent=.. translation=(-0.03173992 -0.17 -0.04368727)
          orientation=(0 3.7699 1.57)
      PhysicalOffsetFrame humerus_r_imu17_30deg_frame: socket_parent=.. translation=(-0.03173992 -0.17 -0.04368727)
          orientation=(0 3.7699 2.093599)
      PhysicalOffsetFrame humerus_r_imu17_-30deg_frame: socket_parent=.. translation=(-0.03173992 -0.17 -0.04368727)
          orientation=(0 3.7699 1.046401)
      PhysicalOffsetFrame humerus_r_imu18_0deg_frame: socket_parent=.. translation=(-0.05135656 -0.17 -0.01668844)
          orientation=(0 4.3982 1.57)
      PhysicalOffsetFrame humerus_r_imu18_30deg_frame: socket_parent=.. translation=(-0.05135656 -0.17 -0.01668844)
          orientation=(0 4.3982 2.093599)
      PhysicalOffsetFrame humerus_r_imu18_-30deg_frame: socket_parent=.. translation=(-0.05135656 -0.17 -0.01668844)
          orientation=(0 4.3982 1.046401)
      PhysicalOffsetFrame humerus_r_imu19_0deg_frame: socket_parent=.. translation=(-0.05135786 -0.17 0.01668444)
          orientation=(0 5.0265 1.57)
      PhysicalOffsetFrame humerus_r_imu19_30deg_frame: socket_parent=.. translation=(-0.05135786 -0.17 0.01668444)
          orientation=(0 5.0265 2.093599)
      PhysicalOffsetFrame humerus_r_imu19_-30deg_frame: socket_parent=.. translation=(-0.05135786 -0.17 0.01668444)
          orientation=(0 5.0265 1.046401)
      PhysicalOffsetFrame humerus_r_imu20_0deg_frame: socket_parent=.. translation=(-0.03173895 -0.17 0.04368797)
          orientation=(0 5.6549 1.57)
      PhysicalOffsetFrame humerus_r_imu20_30deg_frame: socket_parent=.. translation=(-0.03173895 -0.17 0.04368797)
          orientation=(0 5.6549 2.093599)
      PhysicalOffsetFrame humerus_r_imu20_-30deg_frame: socket_parent=.. translation=(-0.03173895 -0.17 0.04368797)
          orientation=(0 5.6549 1.046401)
      PhysicalOffsetFrame humerus_r_imu21_0deg_frame: socket_parent=.. translation=(7.934123e-7 -0.17 0.054)
          orientation=(0 6.2832 1.57)
      PhysicalOffsetFrame humerus_r_imu21_30deg_frame: socket_parent=.. translation=(7.934123e-7 -0.17 0.054)
          orientation=(0 6.2832 2.093599)
      PhysicalOffsetFrame humerus_r_imu21_-30deg_frame: socket_parent=.. translation=(7.934123e-7 -0.17 0.054)
          orientation=(0 6.2832 1.046401)
      PhysicalOffsetFrame humerus_r_imu22_0deg_frame: socket_parent=.. translation=(-0.03173992 -0.07 -0.04368727)
          orientation=(0 3.7699 1.57)
      PhysicalOffsetFrame humerus_r_imu22_30deg_frame: socket_parent=.. translation=(-0.03173992 -0.07 -0.04368727)
          orientation=(0 3.7699 2.093599)
      PhysicalOffsetFrame humerus_r_imu22_-30deg_frame: socket_parent=.. translation=(-0.03173992 -0.07 -0.04368727)
          orientation=(0 3.7699 1.046401)
      PhysicalOffsetFrame humerus_r_imu23_0deg_frame: socket_parent=.. translation=(-0.05135656 -0.07 -0.01668844)
          orientation=(0 4.3982 1.57)
      PhysicalOffsetFrame humerus_r_imu23_30deg_frame: socket_parent=.. translation=(-0.05135656 -0.07 -0.01668844)
          orientation=(0 4.3982 2.093599)
      PhysicalOffsetFrame humerus_r_imu23_-30deg_frame: socket_parent=.. translation=(-0.05135656 -0.07 -0.01668844)
          orientation=(0 4.3982 1.046401)
      PhysicalOffsetFrame humerus_r_imu24_0deg_frame: socket_parent=.. translation=(-0.05135786 -0.07 0.01668444)
          orientation=(0 5.0265 1.57)
      PhysicalOffsetFrame humerus_r_imu24_30deg_frame: socket_parent=.. translation=(-0.05135786 -0.07 0.01668444)
          orientation=(0 5.0265 2.093599)
      PhysicalOffsetFrame humerus_r_imu24_-30deg_frame: socket_parent=.. translation=(-0.05135786 -0.07 0.01668444)
          orientation=(0 5.0265 1.046401)
      PhysicalOffsetFrame humerus_r_imu25_0deg_frame: socket_parent=.. translation=(-0.03173895 -0.07 0.04368797)
          orientation=(0 5.6549 1.57)
      PhysicalOffsetFrame humerus_r_imu25_30deg_frame: socket_parent=.. translation=(-0.03173895 -0.07 0.04368797)
          orientation=(0 5.6549 2.093599)
      PhysicalOffsetFrame humerus_r_imu25_-30deg_frame: socket_parent=.. translation=(-0.03173895 -0.07 0.04368797)
          orientation=(0 5.6549 1.046401)
      PhysicalOffsetFrame humerus_r_imu26_0deg_frame: socket_parent=.. translation=(7.934123e-7 -0.07 0.054)
          orientation=(0 6.2832 1.57)
      PhysicalOffsetFrame humerus_r_imu26_30deg_frame: socket_parent=.. translation=(7.934123e-7 -0.07 0.054)
          orientation=(0 6.2832 2.093599)
      PhysicalOffsetFrame humerus_r_imu26_-30deg_frame: socket_parent=.. translation=(7.934123e-7 -0.07 0.054)
          orientation=(0 6.2832 1.046401)
      PhysicalOffsetFrame humerus_r_imu27_0deg_frame: socket_parent=.. translation=(-0.03173992 -0.195 -0.04368727)
          orientation=(0 3.7699 1.57)
      PhysicalOffsetFrame humerus_r_imu27_30deg_frame: socket_parent=.. translation=(-0.03173992 -0.195 -0.04368727)
          orientation=(0 3.7699 2.093599)
      PhysicalOffsetFrame humerus_r_imu27_-30deg_frame: socket_parent=.. translation=(-0.03173992 -0.195 -0.04368727)
          orientation=(0 3.7699 1.046401)
      PhysicalOffsetFrame humerus_r_imu28_0deg_frame: socket_parent=.. translation=(-0.05135656 -0.195 -0.01668844)
          orientation=(0 4.3982 1.57)
      PhysicalOffsetFrame humerus_r_imu28_30deg_frame: socket_parent=.. translation=(-0.05135656 -0.195 -0.01668844)
          orientation=(0 4.3982 2.093599)
      PhysicalOffsetFrame humerus_r_imu28_-30deg_frame: socket_parent=.. translation=(-0.05135656 -0.195 -0.01668844)
          orientation=(0 4.3982 1.046401)
      PhysicalOffsetFrame humerus_r_imu29_0deg_frame: socket_parent=.. translation=(-0.05135786 -0.195 0.01668444)
          orientation=(0 5.0265 1.57)
      PhysicalOffsetFrame humerus_r_imu29_30deg_frame: socket_parent=.. translation=(-0.05135786 -0.195 0.01668444)
          orientation=(0 5.0265 2.093599)
      PhysicalOffsetFrame humerus_r_imu29_-30deg_frame: socket_parent=.. translation=(-0.05135786 -0.195 0.01668444)
          orientation=(0 5.0265 1.046401)
      PhysicalOffsetFrame humerus_r_imu30_0deg_frame: socket_parent=.. translation=(-0.03173895 -0.195 0.04368797)
          orientation=(0 5.6549 1.57)
      PhysicalOffsetFrame humerus_r_imu30_30deg_frame: socket_parent=.. translation=(-0.03173895 -0.195 0.04368797)
          orientation=(0 5.6549 2.093599)
      PhysicalOffsetFrame humerus_r_imu30_-30deg_frame: socket_parent=.. translation=(-0.03173895 -0.195 0.04368797)
          orientation=(0 5.6549 1.046401)
      PhysicalOffsetFrame humerus_r_imu31_0deg_frame: socket_parent=.. translation=(7.934123e-7 -0.195 0.054)
          orientation=(0 6.2832 1.57)
      PhysicalOffsetFrame humerus_r_imu31_30deg_frame: socket_parent=.. translation=(7.934123e-7 -0.195 0.054)
          orientation=(0 6.2832 2.093599)
      PhysicalOffsetFrame humerus_r_imu31_-30deg_frame: socket_parent=.. translation=(7.934123e-7 -0.195 0.054)
          orientation=(0 6.2832 1.046401)
    Body ulna_r: mass=0.6075 mass_center=(0 -0.120525 0) inertia=(0.002962 0.000618 0.003213 0 0 0) meshes=ulna_rv.vtp
      PhysicalOffsetFrame ulna_r_imu: socket_parent=.. translation=(-0.045 -0.12 0.035) orientation=(0 1.57 1.57)
      PhysicalOffsetFrame ulna_r_imu2_0deg_frame: socket_parent=.. translation=(-0.03173992 -0.12 -0.008687273)
          orientation=(0 3.7699 1.57)
      PhysicalOffsetFrame ulna_r_imu2_30deg_frame: socket_parent=.. translation=(-0.03173992 -0.12 -0.008687273)
          orientation=(0 3.7699 2.093599)
      PhysicalOffsetFrame ulna_r_imu2_-30deg_frame: socket_parent=.. translation=(-0.03173992 -0.12 -0.008687273)
          orientation=(0 3.7699 1.046401)
      PhysicalOffsetFrame ulna_r_imu3_0deg_frame: socket_parent=.. translation=(-0.05135656 -0.12 0.01831156)
          orientation=(0 4.3982 1.57)
      PhysicalOffsetFrame ulna_r_imu3_30deg_frame: socket_parent=.. translation=(-0.05135656 -0.12 0.01831156)
          orientation=(0 4.3982 2.093599)
      PhysicalOffsetFrame ulna_r_imu3_-30deg_frame: socket_parent=.. translation=(-0.05135656 -0.12 0.01831156)
          orientation=(0 4.3982 1.046401)
      PhysicalOffsetFrame ulna_r_imu4_0deg_frame: socket_parent=.. translation=(-0.05135786 -0.12 0.05168444)
          orientation=(0 5.0265 1.57)
      PhysicalOffsetFrame ulna_r_imu4_30deg_frame: socket_parent=.. translation=(-0.05135786 -0.12 0.05168444)
          orientation=(0 5.0265 2.093599)
      PhysicalOffsetFrame ulna_r_imu4_-30deg_frame: socket_parent=.. translation=(-0.05135786 -0.12 0.05168444)
          orientation=(0 5.0265 1.046401)
      PhysicalOffsetFrame ulna_r_imu5_0deg_frame: socket_parent=.. translation=(-0.03173895 -0.12 0.07868797)
          orientation=(0 5.6549 1.57)
      PhysicalOffsetFrame ulna_r_imu5_30deg_frame: socket_parent=.. translation=(-0.03173895 -0.12 0.07868797)
          orientation=(0 5.6549 2.093599)
      PhysicalOffsetFrame ulna_r_imu5_-30deg_frame: socket_parent=.. translation=(-0.03173895 -0.12 0.07868797)
          orientation=(0 5.6549 1.046401)
      PhysicalOffsetFrame ulna_r_imu6_0deg_frame: socket_parent=.. translation=(7.934123e-7 -0.12 0.089)
          orientation=(0 6.2832 1.57)
      PhysicalOffsetFrame ulna_r_imu6_30deg_frame: socket_parent=.. translation=(7.934123e-7 -0.12 0.089)
          orientation=(0 6.2832 2.093599)
      PhysicalOffsetFrame ulna_r_imu6_-30deg_frame: socket_parent=.. translation=(7.934123e-7 -0.12 0.089)
          orientation=(0 6.2832 1.046401)
      PhysicalOffsetFrame ulna_r_imu7_0deg_frame: socket_parent=.. translation=(-0.03173992 -0.095 -0.008687273)
          orientation=(0 3.7699 1.57)
      PhysicalOffsetFrame ulna_r_imu7_30deg_frame: socket_parent=.. translation=(-0.03173992 -0.095 -0.008687273)
          orientation=(0 3.7699 2.093599)
      PhysicalOffsetFrame ulna_r_imu7_-30deg_frame: socket_parent=.. translation=(-0.03173992 -0.095 -0.008687273)
          orientation=(0 3.7699 1.046401)
      PhysicalOffsetFrame ulna_r_imu8_0deg_frame: socket_parent=.. translation=(-0.05135656 -0.095 0.01831156)
          orientation=(0 4.3982 1.57)
      PhysicalOffsetFrame ulna_r_imu8_30deg_frame: socket_parent=.. translation=(-0.05135656 -0.095 0.01831156)
          orientation=(0 4.3982 2.093599)
      PhysicalOffsetFrame ulna_r_imu8_-30deg_frame: socket_parent=.. translation=(-0.05135656 -0.095 0.01831156)
          orientation=(0 4.3982 1.046401)
      PhysicalOffsetFrame ulna_r_imu9_0deg_frame: socket_parent=.. translation=(-0.05135786 -0.095 0.05168444)
          orientation=(0 5.0265 1.57)
      PhysicalOffsetFrame ulna_r_imu9_30deg_frame: socket_parent=.. translation=(-0.05135786 -0.095 0.05168444)
          orientation=(0 5.0265 2.093599)
      PhysicalOffsetFrame ulna_r_imu9_-30deg_frame: socket_parent=.. translation=(-0.05135786 -0.095 0.05168444)
          orientation=(0 5.0265 1.046401)
      PhysicalOffsetFrame ulna_r_imu10_0deg_frame: socket_parent=.. translation=(-0.03173895 -0.095 0.07868797)
          orientation=(0 5.6549 1.57)
      PhysicalOffsetFrame ulna_r_imu10_30deg_frame: socket_parent=.. translation=(-0.03173895 -0.095 0.07868797)
          orientation=(0 5.6549 2.093599)
      PhysicalOffsetFrame ulna_r_imu10_-30deg_frame: socket_parent=.. translation=(-0.03173895 -0.095 0.07868797)
          orientation=(0 5.6549 1.046401)
      PhysicalOffsetFrame ulna_r_imu11_0deg_frame: socket_parent=.. translation=(7.934123e-7 -0.095 0.089)
          orientation=(0 6.2832 1.57)
      PhysicalOffsetFrame ulna_r_imu11_30deg_frame: socket_parent=.. translation=(7.934123e-7 -0.095 0.089)
          orientation=(0 6.2832 2.093599)
      PhysicalOffsetFrame ulna_r_imu11_-30deg_frame: socket_parent=.. translation=(7.934123e-7 -0.095 0.089)
          orientation=(0 6.2832 1.046401)
      PhysicalOffsetFrame ulna_r_imu12_0deg_frame: socket_parent=.. translation=(-0.03173992 -0.145 -0.008687273)
          orientation=(0 3.7699 1.57)
      PhysicalOffsetFrame ulna_r_imu12_30deg_frame: socket_parent=.. translation=(-0.03173992 -0.145 -0.008687273)
          orientation=(0 3.7699 2.093599)
      PhysicalOffsetFrame ulna_r_imu12_-30deg_frame: socket_parent=.. translation=(-0.03173992 -0.145 -0.008687273)
          orientation=(0 3.7699 1.046401)
      PhysicalOffsetFrame ulna_r_imu13_0deg_frame: socket_parent=.. translation=(-0.05135656 -0.145 0.01831156)
          orientation=(0 4.3982 1.57)
      PhysicalOffsetFrame ulna_r_imu13_30deg_frame: socket_parent=.. translation=(-0.05135656 -0.145 0.01831156)
          orientation=(0 4.3982 2.093599)
      PhysicalOffsetFrame ulna_r_imu13_-30deg_frame: socket_parent=.. translation=(-0.05135656 -0.145 0.01831156)
          orientation=(0 4.3982 1.046401)
      PhysicalOffsetFrame ulna_r_imu14_0deg_frame: socket_parent=.. translation=(-0.05135786 -0.145 0.05168444)
          orientation=(0 5.0265 1.57)
      PhysicalOffsetFrame ulna_r_imu14_30deg_frame: socket_parent=.. translation=(-0.05135786 -0.145 0.05168444)
          orientation=(0 5.0265 2.093599)
      PhysicalOffsetFrame ulna_r_imu14_-30deg_frame: socket_parent=.. translation=(-0.05135786 -0.145 0.05168444)
          orientation=(0 5.0265 1.046401)
      PhysicalOffsetFrame ulna_r_imu15_0deg_frame: socket_parent=.. translation=(-0.03173895 -0.145 0.07868797)
          orientation=(0 5.6549 1.57)
      PhysicalOffsetFrame ulna_r_imu15_30deg_frame: socket_parent=.. translation=(-0.03173895 -0.145 0.07868797)
          orientation=(0 5.6549 2.093599)
      PhysicalOffsetFrame ulna_r_imu15_-30deg_frame: socket_parent=.. translation=(-0.03173895 -0.145 0.07868797)
          orientation=(0 5.6549 1.046401)
      PhysicalOffsetFrame ulna_r_imu16_0deg_frame: socket_parent=.. translation=(7.934123e-7 -0.145 0.089)
          orientation=(0 6.2832 1.57)
      PhysicalOffsetFrame ulna_r_imu16_30deg_frame: socket_parent=.. translation=(7.934123e-7 -0.145 0.089)
          orientation=(0 6.2832 2.093599)
      PhysicalOffsetFrame ulna_r_imu16_-30deg_frame: socket_parent=.. translation=(7.934123e-7 -0.145 0.089)
          orientation=(0 6.2832 1.046401)
      PhysicalOffsetFrame ulna_r_imu17_0deg_frame: socket_parent=.. translation=(-0.03173992 -0.17 -0.008687273)
          orientation=(0 3.7699 1.57)
      PhysicalOffsetFrame ulna_r_imu17_30deg_frame: socket_parent=.. translation=(-0.03173992 -0.17 -0.008687273)
          orientation=(0 3.7699 2.093599)
      PhysicalOffsetFrame ulna_r_imu17_-30deg_frame: socket_parent=.. translation=(-0.03173992 -0.17 -0.008687273)
          orientation=(0 3.7699 1.046401)
      PhysicalOffsetFrame ulna_r_imu18_0deg_frame: socket_parent=.. translation=(-0.05135656 -0.17 0.01831156)
          orientation=(0 4.3982 1.57)
      PhysicalOffsetFrame ulna_r_imu18_30deg_frame: socket_parent=.. translation=(-0.05135656 -0.17 0.01831156)
          orientation=(0 4.3982 2.093599)
      PhysicalOffsetFrame ulna_r_imu18_-30deg_frame: socket_parent=.. translation=(-0.05135656 -0.17 0.01831156)
          orientation=(0 4.3982 1.046401)
      PhysicalOffsetFrame ulna_r_imu19_0deg_frame: socket_parent=.. translation=(-0.05135786 -0.17 0.05168444)
          orientation=(0 5.0265 1.57)
      PhysicalOffsetFrame ulna_r_imu19_30deg_frame: socket_parent=.. translation=(-0.05135786 -0.17 0.05168444)
          orientation=(0 5.0265 2.093599)
      PhysicalOffsetFrame ulna_r_imu19_-30deg_frame: socket_parent=.. translation=(-0.05135786 -0.17 0.05168444)
          orientation=(0 5.0265 1.046401)
      PhysicalOffsetFrame ulna_r_imu20_0deg_frame: socket_parent=.. translation=(-0.03173895 -0.17 0.07868797)
          orientation=(0 5.6549 1.57)
      PhysicalOffsetFrame ulna_r_imu20_30deg_frame: socket_parent=.. translation=(-0.03173895 -0.17 0.07868797)
          orientation=(0 5.6549 2.093599)
      PhysicalOffsetFrame ulna_r_imu20_-30deg_frame: socket_parent=.. translation=(-0.03173895 -0.17 0.07868797)
          orientation=(0 5.6549 1.046401)
      PhysicalOffsetFrame ulna_r_imu21_0deg_frame: socket_parent=.. translation=(7.934123e-7 -0.17 0.089)
          orientation=(0 6.2832 1.57)
      PhysicalOffsetFrame ulna_r_imu21_30deg_frame: socket_parent=.. translation=(7.934123e-7 -0.17 0.089)
          orientation=(0 6.2832 2.093599)
      PhysicalOffsetFrame ulna_r_imu21_-30deg_frame: socket_parent=.. translation=(7.934123e-7 -0.17 0.089)
          orientation=(0 6.2832 1.046401)
      PhysicalOffsetFrame ulna_r_imu22_0deg_frame: socket_parent=.. translation=(-0.03173992 -0.07 -0.008687273)
          orientation=(0 3.7699 1.57)
      PhysicalOffsetFrame ulna_r_imu22_30deg_frame: socket_parent=.. translation=(-0.03173992 -0.07 -0.008687273)
          orientation=(0 3.7699 2.093599)
      PhysicalOffsetFrame ulna_r_imu22_-30deg_frame: socket_parent=.. translation=(-0.03173992 -0.07 -0.008687273)
          orientation=(0 3.7699 1.046401)
      PhysicalOffsetFrame ulna_r_imu23_0deg_frame: socket_parent=.. translation=(-0.05135656 -0.07 0.01831156)
          orientation=(0 4.3982 1.57)
      PhysicalOffsetFrame ulna_r_imu23_30deg_frame: socket_parent=.. translation=(-0.05135656 -0.07 0.01831156)
          orientation=(0 4.3982 2.093599)
      PhysicalOffsetFrame ulna_r_imu23_-30deg_frame: socket_parent=.. translation=(-0.05135656 -0.07 0.01831156)
          orientation=(0 4.3982 1.046401)
      PhysicalOffsetFrame ulna_r_imu24_0deg_frame: socket_parent=.. translation=(-0.05135786 -0.07 0.05168444)
          orientation=(0 5.0265 1.57)
      PhysicalOffsetFrame ulna_r_imu24_30deg_frame: socket_parent=.. translation=(-0.05135786 -0.07 0.05168444)
          orientation=(0 5.0265 2.093599)
      PhysicalOffsetFrame ulna_r_imu24_-30deg_frame: socket_parent=.. translation=(-0.05135786 -0.07 0.05168444)
          orientation=(0 5.0265 1.046401)
      PhysicalOffsetFrame ulna_r_imu25_0deg_frame: socket_parent=.. translation=(-0.03173895 -0.07 0.07868797)
          orientation=(0 5.6549 1.57)
      PhysicalOffsetFrame ulna_r_imu25_30deg_frame: socket_parent=.. translation=(-0.03173895 -0.07 0.07868797)
          orientation=(0 5.6549 2.093599)
      PhysicalOffsetFrame ulna_r_imu25_-30deg_frame: socket_parent=.. translation=(-0.03173895 -0.07 0.07868797)
          orientation=(0 5.6549 1.046401)
      PhysicalOffsetFrame ulna_r_imu26_0deg_frame: socket_parent=.. translation=(7.934123e-7 -0.07 0.089)
          orientation=(0 6.2832 1.57)
      PhysicalOffsetFrame ulna_r_imu26_30deg_frame: socket_parent=.. translation=(7.934123e-7 -0.07 0.089)
          orientation=(0 6.2832 2.093599)
      PhysicalOffsetFrame ulna_r_imu26_-30deg_frame: socket_parent=.. translation=(7.934123e-7 -0.07 0.089)
          orientation=(0 6.2832 1.046401)
      PhysicalOffsetFrame ulna_r_imu27_0deg_frame: socket_parent=.. translation=(-0.03173992 -0.195 -0.008687273)
          orientation=(0 3.7699 1.57)
      PhysicalOffsetFrame ulna_r_imu27_30deg_frame: socket_parent=.. translation=(-0.03173992 -0.195 -0.008687273)
          orientation=(0 3.7699 2.093599)
      PhysicalOffsetFrame ulna_r_imu27_-30deg_frame: socket_parent=.. translation=(-0.03173992 -0.195 -0.008687273)
          orientation=(0 3.7699 1.046401)
      PhysicalOffsetFrame ulna_r_imu28_0deg_frame: socket_parent=.. translation=(-0.05135656 -0.195 0.01831156)
          orientation=(0 4.3982 1.57)
      PhysicalOffsetFrame ulna_r_imu28_30deg_frame: socket_parent=.. translation=(-0.05135656 -0.195 0.01831156)
          orientation=(0 4.3982 2.093599)
      PhysicalOffsetFrame ulna_r_imu28_-30deg_frame: socket_parent=.. translation=(-0.05135656 -0.195 0.01831156)
          orientation=(0 4.3982 1.046401)
      PhysicalOffsetFrame ulna_r_imu29_0deg_frame: socket_parent=.. translation=(-0.05135786 -0.195 0.05168444)
          orientation=(0 5.0265 1.57)
      PhysicalOffsetFrame ulna_r_imu29_30deg_frame: socket_parent=.. translation=(-0.05135786 -0.195 0.05168444)
          orientation=(0 5.0265 2.093599)
      PhysicalOffsetFrame ulna_r_imu29_-30deg_frame: socket_parent=.. translation=(-0.05135786 -0.195 0.05168444)
          orientation=(0 5.0265 1.046401)
      PhysicalOffsetFrame ulna_r_imu30_0deg_frame: socket_parent=.. translation=(-0.03173895 -0.195 0.07868797)
          orientation=(0 5.6549 1.57)
      PhysicalOffsetFrame ulna_r_imu30_30deg_frame: socket_parent=.. translation=(-0.03173895 -0.195 0.07868797)
          orientation=(0 5.6549 2.093599)
      PhysicalOffsetFrame ulna_r_imu30_-30deg_frame: socket_parent=.. translation=(-0.03173895 -0.195 0.07868797)
          orientation=(0 5.6549 1.046401)
      PhysicalOffsetFrame ulna_r_imu31_0deg_frame: socket_parent=.. translation=(7.934123e-7 -0.195 0.089)
          orientation=(0 6.2832 1.57)
      PhysicalOffsetFrame ulna_r_imu31_30deg_frame: socket_parent=.. translation=(7.934123e-7 -0.195 0.089)
          orientation=(0 6.2832 2.093599)
      PhysicalOffsetFrame ulna_r_imu31_-30deg_frame: socket_parent=.. translation=(7.934123e-7 -0.195 0.089)
          orientation=(0 6.2832 1.046401)
    Body radius_r: mass=0.6075 mass_center=(0 -0.120525 0) inertia=(0.002962 0.000618 0.003213 0 0 0)
        meshes=radius_rv.vtp
    Body hand_r: mass=0.4575 mass_center=(0 -0.068095 0) inertia=(0.000892 0.000547 0.00134 0 0 0)
        meshes=(pisiform_rvs.vtp lunate_rvs.vtp scaphoid_rvs.vtp triquetrum_rvs.vtp hamate_rvs.vtp capitate_rvs.vtp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)
    Body humerus_l: mass=2.0325 mass_center=(0 -0.164502 0) inertia=(0.011946 0.004121 0.013409 0 0 0)
        meshes=humerus_lv.vtp
      PhysicalOffsetFrame humerus_l_imu: socket_parent=.. translation=(-0.03 -0.12 0) orientation=(0 1.57 1.57)
      PhysicalOffsetFrame humerus_l_imu2_0deg_frame: socket_parent=.. translation=(-0.03173992 -0.12 -0.04368727)
          orientation=(0 3.7699 1.57)
      PhysicalOffsetFrame humerus_l_imu2_30deg_frame: socket_parent=.. translation=(-0.03173992 -0.12 -0.04368727)
          orientation=(0 3.7699 2.093599)
      PhysicalOffsetFrame humerus_l_imu2_-30deg_frame: socket_parent=.. translation=(-0.03173992 -0.12 -0.04368727)
          orientation=(0 3.7699 1.046401)
      PhysicalOffsetFrame humerus_l_imu3_0deg_frame: socket_parent=.. translation=(-0.05135656 -0.12 -0.01668844)
          orientation=(0 4.3982 1.57)
      PhysicalOffsetFrame humerus_l_imu3_30deg_frame: socket_parent=.. translation=(-0.05135656 -0.12 -0.01668844)
          orientation=(0 4.3982 2.093599)
      PhysicalOffsetFrame humerus_l_imu3_-30deg_frame: socket_parent=.. translation=(-0.05135656 -0.12 -0.01668844)
          orientation=(0 4.3982 1.046401)
      PhysicalOffsetFrame humerus_l_imu4_0deg_frame: socket_parent=.. translation=(-0.05135786 -0.12 0.01668444)
          orientation=(0 5.0265 1.57)
      PhysicalOffsetFrame humerus_l_imu4_30deg_frame: socket_parent=.. translation=(-0.05135786 -0.12 0.01668444)
          orientation=(0 5.0265 2.093599)
      PhysicalOffsetFrame humerus_l_imu4_-30deg_frame: socket_parent=.. translation=(-0.05135786 -0.12 0.01668444)
          orientation=(0 5.0265 1.046401)
      PhysicalOffsetFrame humerus_l_imu5_0deg_frame: socket_parent=.. translation=(-0.03173895 -0.12 0.04368797)
          orientation=(0 5.6549 1.57)
      PhysicalOffsetFrame humerus_l_imu5_30deg_frame: socket_parent=.. translation=(-0.03173895 -0.12 0.04368797)
          orientation=(0 5.6549 2.093599)
      PhysicalOffsetFrame humerus_l_imu5_-30deg_frame: socket_parent=.. translation=(-0.03173895 -0.12 0.04368797)
          orientation=(0 5.6549 1.046401)
      PhysicalOffsetFrame humerus_l_imu6_0deg_frame: socket_parent=.. translation=(7.934123e-7 -0.12 0.054)
          orientation=(0 6.2832 1.57)
      PhysicalOffsetFrame humerus_l_imu6_30deg_frame: socket_parent=.. translation=(7.934123e-7 -0.12 0.054)
          orientation=(0 6.2832 2.093599)
      PhysicalOffsetFrame humerus_l_imu6_-30deg_frame: socket_parent=.. translation=(7.934123e-7 -0.12 0.054)
          orientation=(0 6.2832 1.046401)
      PhysicalOffsetFrame humerus_l_imu7_0deg_frame: socket_parent=.. translation=(-0.03173992 -0.095 -0.04368727)
          orientation=(0 3.7699 1.57)
      PhysicalOffsetFrame humerus_l_imu7_30deg_frame: socket_parent=.. translation=(-0.03173992 -0.095 -0.04368727)
          orientation=(0 3.7699 2.093599)
      PhysicalOffsetFrame humerus_l_imu7_-30deg_frame: socket_parent=.. translation=(-0.03173992 -0.095 -0.04368727)
          orientation=(0 3.7699 1.046401)
      PhysicalOffsetFrame humerus_l_imu8_0deg_frame: socket_parent=.. translation=(-0.05135656 -0.095 -0.01668844)
          orientation=(0 4.3982 1.57)
      PhysicalOffsetFrame humerus_l_imu8_30deg_frame: socket_parent=.. translation=(-0.05135656 -0.095 -0.01668844)
          orientation=(0 4.3982 2.093599)
      PhysicalOffsetFrame humerus_l_imu8_-30deg_frame: socket_parent=.. translation=(-0.05135656 -0.095 -0.01668844)
          orientation=(0 4.3982 1.046401)
      PhysicalOffsetFrame humerus_l_imu9_0deg_frame: socket_parent=.. translation=(-0.05135786 -0.095 0.01668444)
          orientation=(0 5.0265 1.57)
      PhysicalOffsetFrame humerus_l_imu9_30deg_frame: socket_parent=.. translation=(-0.05135786 -0.095 0.01668444)
          orientation=(0 5.0265 2.093599)
      PhysicalOffsetFrame humerus_l_imu9_-30deg_frame: socket_parent=.. translation=(-0.05135786 -0.095 0.01668444)
          orientation=(0 5.0265 1.046401)
      PhysicalOffsetFrame humerus_l_imu10_0deg_frame: socket_parent=.. translation=(-0.03173895 -0.095 0.04368797)
          orientation=(0 5.6549 1.57)
      PhysicalOffsetFrame humerus_l_imu10_30deg_frame: socket_parent=.. translation=(-0.03173895 -0.095 0.04368797)
          orientation=(0 5.6549 2.093599)
      PhysicalOffsetFrame humerus_l_imu10_-30deg_frame: socket_parent=.. translation=(-0.03173895 -0.095 0.04368797)
          orientation=(0 5.6549 1.046401)
      PhysicalOffsetFrame humerus_l_imu11_0deg_frame: socket_parent=.. translation=(7.934123e-7 -0.095 0.054)
          orientation=(0 6.2832 1.57)
      PhysicalOffsetFrame humerus_l_imu11_30deg_frame: socket_parent=.. translation=(7.934123e-7 -0.095 0.054)
          orientation=(0 6.2832 2.093599)
      PhysicalOffsetFrame humerus_l_imu11_-30deg_frame: socket_parent=.. translation=(7.934123e-7 -0.095 0.054)
          orientation=(0 6.2832 1.046401)
      PhysicalOffsetFrame humerus_l_imu12_0deg_frame: socket_parent=.. translation=(-0.03173992 -0.145 -0.04368727)
          orientation=(0 3.7699 1.57)
      PhysicalOffsetFrame humerus_l_imu12_30deg_frame: socket_parent=.. translation=(-0.03173992 -0.145 -0.04368727)
          orientation=(0 3.7699 2.093599)
      PhysicalOffsetFrame humerus_l_imu12_-30deg_frame: socket_parent=.. translation=(-0.03173992 -0.145 -0.04368727)
          orientation=(0 3.7699 1.046401)
      PhysicalOffsetFrame humerus_l_imu13_0deg_frame: socket_parent=.. translation=(-0.05135656 -0.145 -0.01668844)
          orientation=(0 4.3982 1.57)
      PhysicalOffsetFrame humerus_l_imu13_30deg_frame: socket_parent=.. translation=(-0.05135656 -0.145 -0.01668844)
          orientation=(0 4.3982 2.093599)
      PhysicalOffsetFrame humerus_l_imu13_-30deg_frame: socket_parent=.. translation=(-0.05135656 -0.145 -0.01668844)
          orientation=(0 4.3982 1.046401)
      PhysicalOffsetFrame humerus_l_imu14_0deg_frame: socket_parent=.. translation=(-0.05135786 -0.145 0.01668444)
          orientation=(0 5.0265 1.57)
      PhysicalOffsetFrame humerus_l_imu14_30deg_frame: socket_parent=.. translation=(-0.05135786 -0.145 0.01668444)
          orientation=(0 5.0265 2.093599)
      PhysicalOffsetFrame humerus_l_imu14_-30deg_frame: socket_parent=.. translation=(-0.05135786 -0.145 0.01668444)
          orientation=(0 5.0265 1.046401)
      PhysicalOffsetFrame humerus_l_imu15_0deg_frame: socket_parent=.. translation=(-0.03173895 -0.145 0.04368797)
          orientation=(0 5.6549 1.57)
      PhysicalOffsetFrame humerus_l_imu15_30deg_frame: socket_parent=.. translation=(-0.03173895 -0.145 0.04368797)
          orientation=(0 5.6549 2.093599)
      PhysicalOffsetFrame humerus_l_imu15_-30deg_frame: socket_parent=.. translation=(-0.03173895 -0.145 0.04368797)
          orientation=(0 5.6549 1.046401)
      PhysicalOffsetFrame humerus_l_imu16_0deg_frame: socket_parent=.. translation=(7.934123e-7 -0.145 0.054)
          orientation=(0 6.2832 1.57)
      PhysicalOffsetFrame humerus_l_imu16_30deg_frame: socket_parent=.. translation=(7.934123e-7 -0.145 0.054)
          orientation=(0 6.2832 2.093599)
      PhysicalOffsetFrame humerus_l_imu16_-30deg_frame: socket_parent=.. translation=(7.934123e-7 -0.145 0.054)
          orientation=(0 6.2832 1.046401)
      PhysicalOffsetFrame humerus_l_imu17_0deg_frame: socket_parent=.. translation=(-0.03173992 -0.17 -0.04368727)
          orientation=(0 3.7699 1.57)
      PhysicalOffsetFrame humerus_l_imu17_30deg_frame: socket_parent=.. translation=(-0.03173992 -0.17 -0.04368727)
          orientation=(0 3.7699 2.093599)
      PhysicalOffsetFrame humerus_l_imu17_-30deg_frame: socket_parent=.. translation=(-0.03173992 -0.17 -0.04368727)
          orientation=(0 3.7699 1.046401)
      PhysicalOffsetFrame humerus_l_imu18_0deg_frame: socket_parent=.. translation=(-0.05135656 -0.17 -0.01668844)
          orientation=(0 4.3982 1.57)
      PhysicalOffsetFrame humerus_l_imu18_30deg_frame: socket_parent=.. translation=(-0.05135656 -0.17 -0.01668844)
          orientation=(0 4.3982 2.093599)
      PhysicalOffsetFrame humerus_l_imu18_-30deg_frame: socket_parent=.. translation=(-0.05135656 -0.17 -0.01668844)
          orientation=(0 4.3982 1.046401)
      PhysicalOffsetFrame humerus_l_imu19_0deg_frame: socket_parent=.. translation=(-0.05135786 -0.17 0.01668444)
          orientation=(0 5.0265 1.57)
      PhysicalOffsetFrame humerus_l_imu19_30deg_frame: socket_parent=.. translation=(-0.05135786 -0.17 0.01668444)
          orientation=(0 5.0265 2.093599)
      PhysicalOffsetFrame humerus_l_imu19_-30deg_frame: socket_parent=.. translation=(-0.05135786 -0.17 0.01668444)
          orientation=(0 5.0265 1.046401)
      PhysicalOffsetFrame humerus_l_imu20_0deg_frame: socket_parent=.. translation=(-0.03173895 -0.17 0.04368797)
          orientation=(0 5.6549 1.57)
      PhysicalOffsetFrame humerus_l_imu20_30deg_frame: socket_parent=.. translation=(-0.03173895 -0.17 0.04368797)
          orientation=(0 5.6549 2.093599)
      PhysicalOffsetFrame humerus_l_imu20_-30deg_frame: socket_parent=.. translation=(-0.03173895 -0.17 0.04368797)
          orientation=(0 5.6549 1.046401)
      PhysicalOffsetFrame humerus_l_imu21_0deg_frame: socket_parent=.. translation=(7.934123e-7 -0.17 0.054)
          orientation=(0 6.2832 1.57)
      PhysicalOffsetFrame humerus_l_imu21_30deg_frame: socket_parent=.. translation=(7.934123e-7 -0.17 0.054)
          orientation=(0 6.2832 2.093599)
      PhysicalOffsetFrame humerus_l_imu21_-30deg_frame: socket_parent=.. translation=(7.934123e-7 -0.17 0.054)
          orientation=(0 6.2832 1.046401)
      PhysicalOffsetFrame humerus_l_imu22_0deg_frame: socket_parent=.. translation=(-0.03173992 -0.07 -0.04368727)
          orientation=(0 3.7699 1.57)
      PhysicalOffsetFrame humerus_l_imu22_30deg_frame: socket_parent=.. translation=(-0.03173992 -0.07 -0.04368727)
          orientation=(0 3.7699 2.093599)
      PhysicalOffsetFrame humerus_l_imu22_-30deg_frame: socket_parent=.. translation=(-0.03173992 -0.07 -0.04368727)
          orientation=(0 3.7699 1.046401)
      PhysicalOffsetFrame humerus_l_imu23_0deg_frame: socket_parent=.. translation=(-0.05135656 -0.07 -0.01668844)
          orientation=(0 4.3982 1.57)
      PhysicalOffsetFrame humerus_l_imu23_30deg_frame: socket_parent=.. translation=(-0.05135656 -0.07 -0.01668844)
          orientation=(0 4.3982 2.093599)
      PhysicalOffsetFrame humerus_l_imu23_-30deg_frame: socket_parent=.. translation=(-0.05135656 -0.07 -0.01668844)
          orientation=(0 4.3982 1.046401)
      PhysicalOffsetFrame humerus_l_imu24_0deg_frame: socket_parent=.. translation=(-0.05135786 -0.07 0.01668444)
          orientation=(0 5.0265 1.57)
      PhysicalOffsetFrame humerus_l_imu24_30deg_frame: socket_parent=.. translation=(-0.05135786 -0.07 0.01668444)
          orientation=(0 5.0265 2.093599)
      PhysicalOffsetFrame humerus_l_imu24_-30deg_frame: socket_parent=.. translation=(-0.05135786 -0.07 0.01668444)
          orientation=(0 5.0265 1.046401)
      PhysicalOffsetFrame humerus_l_imu25_0deg_frame: socket_parent=.. translation=(-0.03173895 -0.07 0.04368797)
          orientation=(0 5.6549 1.57)
      PhysicalOffsetFrame humerus_l_imu25_30deg_frame: socket_parent=.. translation=(-0.03173895 -0.07 0.04368797)
          orientation=(0 5.6549 2.093599)
      PhysicalOffsetFrame humerus_l_imu25_-30deg_frame: socket_parent=.. translation=(-0.03173895 -0.07 0.04368797)
          orientation=(0 5.6549 1.046401)
      PhysicalOffsetFrame humerus_l_imu26_0deg_frame: socket_parent=.. translation=(7.934123e-7 -0.07 0.054)
          orientation=(0 6.2832 1.57)
      PhysicalOffsetFrame humerus_l_imu26_30deg_frame: socket_parent=.. translation=(7.934123e-7 -0.07 0.054)
          orientation=(0 6.2832 2.093599)
      PhysicalOffsetFrame humerus_l_imu26_-30deg_frame: socket_parent=.. translation=(7.934123e-7 -0.07 0.054)
          orientation=(0 6.2832 1.046401)
      PhysicalOffsetFrame humerus_l_imu27_0deg_frame: socket_parent=.. translation=(-0.03173992 -0.195 -0.04368727)
          orientation=(0 3.7699 1.57)
      PhysicalOffsetFrame humerus_l_imu27_30deg_frame: socket_parent=.. translation=(-0.03173992 -0.195 -0.04368727)
          orientation=(0 3.7699 2.093599)
      PhysicalOffsetFrame humerus_l_imu27_-30deg_frame: socket_parent=.. translation=(-0.03173992 -0.195 -0.04368727)
          orientation=(0 3.7699 1.046401)
      PhysicalOffsetFrame humerus_l_imu28_0deg_frame: socket_parent=.. translation=(-0.05135656 -0.195 -0.01668844)
          orientation=(0 4.3982 1.57)
      PhysicalOffsetFrame humerus_l_imu28_30deg_frame: socket_parent=.. translation=(-0.05135656 -0.195 -0.01668844)
          orientation=(0 4.3982 2.093599)
      PhysicalOffsetFrame humerus_l_imu28_-30deg_frame: socket_parent=.. translation=(-0.05135656 -0.195 -0.01668844)
          orientation=(0 4.3982 1.046401)
      PhysicalOffsetFrame humerus_l_imu29_0deg_frame: socket_parent=.. translation=(-0.05135786 -0.195 0.01668444)
          orientation=(0 5.0265 1.57)
      PhysicalOffsetFrame humerus_l_imu29_30deg_frame: socket_parent=.. translation=(-0.05135786 -0.195 0.01668444)
          orientation=(0 5.0265 2.093599)
      PhysicalOffsetFrame humerus_l_imu29_-30deg_frame: socket_parent=.. translation=(-0.05135786 -0.195 0.01668444)
          orientation=(0 5.0265 1.046401)
      PhysicalOffsetFrame humerus_l_imu30_0deg_frame: socket_parent=.. translation=(-0.03173895 -0.195 0.04368797)
          orientation=(0 5.6549 1.57)
      PhysicalOffsetFrame humerus_l_imu30_30deg_frame: socket_parent=.. translation=(-0.03173895 -0.195 0.04368797)
          orientation=(0 5.6549 2.093599)
      PhysicalOffsetFrame humerus_l_imu30_-30deg_frame: socket_parent=.. translation=(-0.03173895 -0.195 0.04368797)
          orientation=(0 5.6549 1.046401)
      PhysicalOffsetFrame humerus_l_imu31_0deg_frame: socket_parent=.. translation=(7.934123e-7 -0.195 0.054)
          orientation=(0 6.2832 1.57)
      PhysicalOffsetFrame humerus_l_imu31_30deg_frame: socket_parent=.. translation=(7.934123e-7 -0.195 0.054)
          orientation=(0 6.2832 2.093599)
      PhysicalOffsetFrame humerus_l_imu31_-30deg_frame: socket_parent=.. translation=(7.934123e-7 -0.195 0.054)
          orientation=(0 6.2832 1.046401)
    Body ulna_l: mass=0.6075 mass_center=(0 -0.120525 0) inertia=(0.002962 0.000618 0.003213 0 0 0) meshes=ulna_lv.vtp
      PhysicalOffsetFrame ulna_l_imu: socket_parent=.. translation=(-0.045 -0.12 -0.035) orientation=(0 1.57 1.57)
      PhysicalOffsetFrame ulna_l_imu2_0deg_frame: socket_parent=.. translation=(-0.03173992 -0.12 -0.07868727)
          orientation=(0 3.7699 1.57)
      PhysicalOffsetFrame ulna_l_imu2_30deg_frame: socket_parent=.. translation=(-0.03173992 -0.12 -0.07868727)
          orientation=(0 3.7699 2.093599)
      PhysicalOffsetFrame ulna_l_imu2_-30deg_frame: socket_parent=.. translation=(-0.03173992 -0.12 -0.07868727)
          orientation=(0 3.7699 1.046401)
      PhysicalOffsetFrame ulna_l_imu3_0deg_frame: socket_parent=.. translation=(-0.05135656 -0.12 -0.05168844)
          orientation=(0 4.3982 1.57)
      PhysicalOffsetFrame ulna_l_imu3_30deg_frame: socket_parent=.. translation=(-0.05135656 -0.12 -0.05168844)
          orientation=(0 4.3982 2.093599)
      PhysicalOffsetFrame ulna_l_imu3_-30deg_frame: socket_parent=.. translation=(-0.05135656 -0.12 -0.05168844)
          orientation=(0 4.3982 1.046401)
      PhysicalOffsetFrame ulna_l_imu4_0deg_frame: socket_parent=.. translation=(-0.05135786 -0.12 -0.01831556)
          orientation=(0 5.0265 1.57)
      PhysicalOffsetFrame ulna_l_imu4_30deg_frame: socket_parent=.. translation=(-0.05135786 -0.12 -0.01831556)
          orientation=(0 5.0265 2.093599)
      PhysicalOffsetFrame ulna_l_imu4_-30deg_frame: socket_parent=.. translation=(-0.05135786 -0.12 -0.01831556)
          orientation=(0 5.0265 1.046401)
      PhysicalOffsetFrame ulna_l_imu5_0deg_frame: socket_parent=.. translation=(-0.03173895 -0.12 0.008687972)
          orientation=(0 5.6549 1.57)
      PhysicalOffsetFrame ulna_l_imu5_30deg_frame: socket_parent=.. translation=(-0.03173895 -0.12 0.008687972)
          orientation=(0 5.6549 2.093599)
      PhysicalOffsetFrame ulna_l_imu5_-30deg_frame: socket_parent=.. translation=(-0.03173895 -0.12 0.008687972)
          orientation=(0 5.6549 1.046401)
      PhysicalOffsetFrame ulna_l_imu6_0deg_frame: socket_parent=.. translation=(7.934123e-7 -0.12 0.019)
          orientation=(0 6.2832 1.57)
      PhysicalOffsetFrame ulna_l_imu6_30deg_frame: socket_parent=.. translation=(7.934123e-7 -0.12 0.019)
          orientation=(0 6.2832 2.093599)
      PhysicalOffsetFrame ulna_l_imu6_-30deg_frame: socket_parent=.. translation=(7.934123e-7 -0.12 0.019)
          orientation=(0 6.2832 1.046401)
      PhysicalOffsetFrame ulna_l_imu7_0deg_frame: socket_parent=.. translation=(-0.03173992 -0.095 -0.07868727)
          orientation=(0 3.7699 1.57)
      PhysicalOffsetFrame ulna_l_imu7_30deg_frame: socket_parent=.. translation=(-0.03173992 -0.095 -0.07868727)
          orientation=(0 3.7699 2.093599)
      PhysicalOffsetFrame ulna_l_imu7_-30deg_frame: socket_parent=.. translation=(-0.03173992 -0.095 -0.07868727)
          orientation=(0 3.7699 1.046401)
      PhysicalOffsetFrame ulna_l_imu8_0deg_frame: socket_parent=.. translation=(-0.05135656 -0.095 -0.05168844)
          orientation=(0 4.3982 1.57)
      PhysicalOffsetFrame ulna_l_imu8_30deg_frame: socket_parent=.. translation=(-0.05135656 -0.095 -0.05168844)
          orientation=(0 4.3982 2.093599)
      PhysicalOffsetFrame ulna_l_imu8_-30deg_frame: socket_parent=.. translation=(-0.05135656 -0.095 -0.05168844)
          orientation=(0 4.3982 1.046401)
      PhysicalOffsetFrame ulna_l_imu9_0deg_frame: socket_parent=.. translation=(-0.05135786 -0.095 -0.01831556)
          orientation=(0 5.0265 1.57)
      PhysicalOffsetFrame ulna_l_imu9_30deg_frame: socket_parent=.. translation=(-0.05135786 -0.095 -0.01831556)
          orientation=(0 5.0265 2.093599)
      PhysicalOffsetFrame ulna_l_imu9_-30deg_frame: socket_parent=.. translation=(-0.05135786 -0.095 -0.01831556)
          orientation=(0 5.0265 1.046401)
      PhysicalOffsetFrame ulna_l_imu10_0deg_frame: socket_parent=.. translation=(-0.03173895 -0.095 0.008687972)
          orientation=(0 5.6549 1.57)
      PhysicalOffsetFrame ulna_l_imu10_30deg_frame: socket_parent=.. translation=(-0.03173895 -0.095 0.008687972)
          orientation=(0 5.6549 2.093599)
      PhysicalOffsetFrame ulna_l_imu10_-30deg_frame: socket_parent=.. translation=(-0.03173895 -0.095 0.008687972)
          orientation=(0 5.6549 1.046401)
      PhysicalOffsetFrame ulna_l_imu11_0deg_frame: socket_parent=.. translation=(7.934123e-7 -0.095 0.019)
          orientation=(0 6.2832 1.57)
      PhysicalOffsetFrame ulna_l_imu11_30deg_frame: socket_parent=.. translation=(7.934123e-7 -0.095 0.019)
          orientation=(0 6.2832 2.093599)
      PhysicalOffsetFrame ulna_l_imu11_-30deg_frame: socket_parent=.. translation=(7.934123e-7 -0.095 0.019)
          orientation=(0 6.2832 1.046401)
      PhysicalOffsetFrame ulna_l_imu12_0deg_frame: socket_parent=.. translation=(-0.03173992 -0.145 -0.07868727)
          orientation=(0 3.7699 1.57)
      PhysicalOffsetFrame ulna_l_imu12_30deg_frame: socket_parent=.. translation=(-0.03173992 -0.145 -0.07868727)
          orientation=(0 3.7699 2.093599)
      PhysicalOffsetFrame ulna_l_imu12_-30deg_frame: socket_parent=.. translation=(-0.03173992 -0.145 -0.07868727)
          orientation=(0 3.7699 1.046401)
      PhysicalOffsetFrame ulna_l_imu13_0deg_frame: socket_parent=.. translation=(-0.05135656 -0.145 -0.05168844)
          orientation=(0 4.3982 1.57)
      PhysicalOffsetFrame ulna_l_imu13_30deg_frame: socket_parent=.. translation=(-0.05135656 -0.145 -0.05168844)
          orientation=(0 4.3982 2.093599)
      PhysicalOffsetFrame ulna_l_imu13_-30deg_frame: socket_parent=.. translation=(-0.05135656 -0.145 -0.05168844)
          orientation=(0 4.3982 1.046401)
      PhysicalOffsetFrame ulna_l_imu14_0deg_frame: socket_parent=.. translation=(-0.05135786 -0.145 -0.01831556)
          orientation=(0 5.0265 1.57)
      PhysicalOffsetFrame ulna_l_imu14_30deg_frame: socket_parent=.. translation=(-0.05135786 -0.145 -0.01831556)
          orientation=(0 5.0265 2.093599)
      PhysicalOffsetFrame ulna_l_imu14_-30deg_frame: socket_parent=.. translation=(-0.05135786 -0.145 -0.01831556)
          orientation=(0 5.0265 1.046401)
      PhysicalOffsetFrame ulna_l_imu15_0deg_frame: socket_parent=.. translation=(-0.03173895 -0.145 0.008687972)
          orientation=(0 5.6549 1.57)
      PhysicalOffsetFrame ulna_l_imu15_30deg_frame: socket_parent=.. translation=(-0.03173895 -0.145 0.008687972)
          orientation=(0 5.6549 2.093599)
      PhysicalOffsetFrame ulna_l_imu15_-30deg_frame: socket_parent=.. translation=(-0.03173895 -0.145 0.008687972)
          orientation=(0 5.6549 1.046401)
      PhysicalOffsetFrame ulna_l_imu16_0deg_frame: socket_parent=.. translation=(7.934123e-7 -0.145 0.019)
          orientation=(0 6.2832 1.57)
      PhysicalOffsetFrame ulna_l_imu16_30deg_frame: socket_parent=.. translation=(7.934123e-7 -0.145 0.019)
          orientation=(0 6.2832 2.093599)
      PhysicalOffsetFrame ulna_l_imu16_-30deg_frame: socket_parent=.. translation=(7.934123e-7 -0.145 0.019)
          orientation=(0 6.2832 1.046401)
      PhysicalOffsetFrame ulna_l_imu17_0deg_frame: socket_parent=.. translation=(-0.03173992 -0.17 -0.07868727)
          orientation=(0 3.7699 1.57)
      PhysicalOffsetFrame ulna_l_imu17_30deg_frame: socket_parent=.. translation=(-0.03173992 -0.17 -0.07868727)
          orientation=(0 3.7699 2.093599)
      PhysicalOffsetFrame ulna_l_imu17_-30deg_frame: socket_parent=.. translation=(-0.03173992 -0.17 -0.07868727)
          orientation=(0 3.7699 1.046401)
      PhysicalOffsetFrame ulna_l_imu18_0deg_frame: socket_parent=.. translation=(-0.05135656 -0.17 -0.05168844)
          orientation=(0 4.3982 1.57)
      PhysicalOffsetFrame ulna_l_imu18_30deg_frame: socket_parent=.. translation=(-0.05135656 -0.17 -0.05168844)
          orientation=(0 4.3982 2.093599)
      PhysicalOffsetFrame ulna_l_imu18_-30deg_frame: socket_parent=.. translation=(-0.05135656 -0.17 -0.05168844)
          orientation=(0 4.3982 1.046401)
      PhysicalOffsetFrame ulna_l_imu19_0deg_frame: socket_parent=.. translation=(-0.05135786 -0.17 -0.01831556)
          orientation=(0 5.0265 1.57)
      PhysicalOffsetFrame ulna_l_imu19_30deg_frame: socket_parent=.. translation=(-0.05135786 -0.17 -0.01831556)
          orientation=(0 5.0265 2.093599)
      PhysicalOffsetFrame ulna_l_imu19_-30deg_frame: socket_parent=.. translation=(-0.05135786 -0.17 -0.01831556)
          orientation=(0 5.0265 1.046401)
      PhysicalOffsetFrame ulna_l_imu20_0deg_frame: socket_parent=.. translation=(-0.03173895 -0.17 0.008687972)
          orientation=(0 5.6549 1.57)
      PhysicalOffsetFrame ulna_l_imu20_30deg_frame: socket_parent=.. translation=(-0.03173895 -0.17 0.008687972)
          orientation=(0 5.6549 2.093599)
      PhysicalOffsetFrame ulna_l_imu20_-30deg_frame: socket_parent=.. translation=(-0.03173895 -0.17 0.008687972)
          orientation=(0 5.6549 1.046401)
      PhysicalOffsetFrame ulna_l_imu21_0deg_frame: socket_parent=.. translation=(7.934123e-7 -0.17 0.019)
          orientation=(0 6.2832 1.57)
      PhysicalOffsetFrame ulna_l_imu21_30deg_frame: socket_parent=.. translation=(7.934123e-7 -0.17 0.019)
          orientation=(0 6.2832 2.093599)
      PhysicalOffsetFrame ulna_l_imu21_-30deg_frame: socket_parent=.. translation=(7.934123e-7 -0.17 0.019)
          orientation=(0 6.2832 1.046401)
      PhysicalOffsetFrame ulna_l_imu22_0deg_frame: socket_parent=.. translation=(-0.03173992 -0.07 -0.07868727)
          orientation=(0 3.7699 1.57)
      PhysicalOffsetFrame ulna_l_imu22_30deg_frame: socket_parent=.. translation=(-0.03173992 -0.07 -0.07868727)
          orientation=(0 3.7699 2.093599)
      PhysicalOffsetFrame ulna_l_imu22_-30deg_frame: socket_parent=.. translation=(-0.03173992 -0.07 -0.07868727)
          orientation=(0 3.7699 1.046401)
      PhysicalOffsetFrame ulna_l_imu23_0deg_frame: socket_parent=.. translation=(-0.05135656 -0.07 -0.05168844)
          orientation=(0 4.3982 1.57)
      PhysicalOffsetFrame ulna_l_imu23_30deg_frame: socket_parent=.. translation=(-0.05135656 -0.07 -0.05168844)
          orientation=(0 4.3982 2.093599)
      PhysicalOffsetFrame ulna_l_imu23_-30deg_frame: socket_parent=.. translation=(-0.05135656 -0.07 -0.05168844)
          orientation=(0 4.3982 1.046401)
      PhysicalOffsetFrame ulna_l_imu24_0deg_frame: socket_parent=.. translation=(-0.05135786 -0.07 -0.01831556)
          orientation=(0 5.0265 1.57)
      PhysicalOffsetFrame ulna_l_imu24_30deg_frame: socket_parent=.. translation=(-0.05135786 -0.07 -0.01831556)
          orientation=(0 5.0265 2.093599)
      PhysicalOffsetFrame ulna_l_imu24_-30deg_frame: socket_parent=.. translation=(-0.05135786 -0.07 -0.01831556)
          orientation=(0 5.0265 1.046401)
      PhysicalOffsetFrame ulna_l_imu25_0deg_frame: socket_parent=.. translation=(-0.03173895 -0.07 0.008687972)
          orientation=(0 5.6549 1.57)
      PhysicalOffsetFrame ulna_l_imu25_30deg_frame: socket_parent=.. translation=(-0.03173895 -0.07 0.008687972)
          orientation=(0 5.6549 2.093599)
      PhysicalOffsetFrame ulna_l_imu25_-30deg_frame: socket_parent=.. translation=(-0.03173895 -0.07 0.008687972)
          orientation=(0 5.6549 1.046401)
      PhysicalOffsetFrame ulna_l_imu26_0deg_frame: socket_parent=.. translation=(7.934123e-7 -0.07 0.019)
          orientation=(0 6.2832 1.57)
      PhysicalOffsetFrame ulna_l_imu26_30deg_frame: socket_parent=.. translation=(7.934123e-7 -0.07 0.019)
          orientation=(0 6.2832 2.093599)
      PhysicalOffsetFrame ulna_l_imu26_-30deg_frame: socket_parent=.. translation=(7.934123e-7 -0.07 0.019)
          orientation=(0 6.2832 1.046401)
      PhysicalOffsetFrame ulna_l_imu27_0deg_frame: socket_parent=.. translation=(-0.03173992 -0.195 -0.07868727)
          orientation=(0 3.7699 1.57)
      PhysicalOffsetFrame ulna_l_imu27_30deg_frame: socket_parent=.. translation=(-0.03173992 -0.195 -0.07868727)
          orientation=(0 3.7699 2.093599)
      PhysicalOffsetFrame ulna_l_imu27_-30deg_frame: socket_parent=.. translation=(-0.03173992 -0.195 -0.07868727)
          orientation=(0 3.7699 1.046401)
      PhysicalOffsetFrame ulna_l_imu28_0deg_frame: socket_parent=.. translation=(-0.05135656 -0.195 -0.05168844)
          orientation=(0 4.3982 1.57)
      PhysicalOffsetFrame ulna_l_imu28_30deg_frame: socket_parent=.. translation=(-0.05135656 -0.195 -0.05168844)
          orientation=(0 4.3982 2.093599)
      PhysicalOffsetFrame ulna_l_imu28_-30deg_frame: socket_parent=.. translation=(-0.05135656 -0.195 -0.05168844)
          orientation=(0 4.3982 1.046401)
      PhysicalOffsetFrame ulna_l_imu29_0deg_frame: socket_parent=.. translation=(-0.05135786 -0.195 -0.01831556)
          orientation=(0 5.0265 1.57)
      PhysicalOffsetFrame ulna_l_imu29_30deg_frame: socket_parent=.. translation=(-0.05135786 -0.195 -0.01831556)
          orientation=(0 5.0265 2.093599)
      PhysicalOffsetFrame ulna_l_imu29_-30deg_frame: socket_parent=.. translation=(-0.05135786 -0.195 -0.01831556)
          orientation=(0 5.0265 1.046401)
      PhysicalOffsetFrame ulna_l_imu30_0deg_frame: socket_parent=.. translation=(-0.03173895 -0.195 0.008687972)
          orientation=(0 5.6549 1.57)
      PhysicalOffsetFrame ulna_l_imu30_30deg_frame: socket_parent=.. translation=(-0.03173895 -0.195 0.008687972)
          orientation=(0 5.6549 2.093599)
      PhysicalOffsetFrame ulna_l_imu30_-30deg_frame: socket_parent=.. translation=(-0.03173895 -0.195 0.008687972)
          orientation=(0 5.6549 1.046401)
      PhysicalOffsetFrame ulna_l_imu31_0deg_frame: socket_parent=.. translation=(7.934123e-7 -0.195 0.019)
          orientation=(0 6.2832 1.57)
      PhysicalOffsetFrame ulna_l_imu31_30deg_frame: socket_parent=.. translation=(7.934123e-7 -0.195 0.019)
          orientation=(0 6.2832 2.093599)
      PhysicalOffsetFrame ulna_l_imu31_-30deg_frame: socket_parent=.. translation=(7.934123e-7 -0.195 0.019)
          orientation=(0 6.2832 1.046401)
    Body radius_l: mass=0.6075 mass_center=(0 -0.120525 0) inertia=(0.002962 0.000618 0.003213 0 0 0)
        meshes=radius_lv.vtp
    Body hand_l: mass=0.4575 mass_center=(0 -0.068095 0) inertia=(0.000892 0.000547 0.00134 0 0 0)
        meshes=(pisiform_lvs.vtp lunate_lvs.vtp scaphoid_lvs.vtp triquetrum_lvs.vtp hamate_lvs.vtp capitate_lvs.vtp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)
  JointSet:
    CustomJoint ground_pelvis: socket_parent_frame=ground_offset socket_child_frame=pelvis_offset
      Coordinate pelvis_tilt: default_value=0 range=(-1.570796 1.570796) clamped=true
      Coordinate pelvis_list: default_value=0 range=(-1.570796 1.570796) clamped=true
      Coordinate pelvis_rotation: default_value=0 range=(-1.570796 1.570796) clamped=true
      Coordinate pelvis_tx: default_value=0 range=(-5 5) clamped=true
      Coordinate pelvis_ty: default_value=0.94 range=(-1 2) clamped=true
      Coordinate pelvis_tz: default_value=0 range=(-3 3) clamped=true
      PhysicalOffsetFrame ground_offset: socket_parent=/ground translation=(0 0 0)
      PhysicalOffsetFrame pelvis_offset: socket_parent=/bodyset/pelvis translation=(0 0 0)
      SpatialTransform:
        TransformAxis rotation1: coordinates=pelvis_tilt axis=(0 0 1) LinearFunction(coefficients=1 0)
        TransformAxis rotation2: coordinates=pelvis_list axis=(1 0 0) LinearFunction(coefficients=1 0)
        TransformAxis rotation3: coordinates=pelvis_rotation axis=(0 1 0) LinearFunction(coefficients=1 0)
        TransformAxis translation1: coordinates=pelvis_tx axis=(1 0 0) LinearFunction(coefficients=1 0)
        TransformAxis translation2: coordinates=pelvis_ty axis=(0 1 0) LinearFunction(coefficients=1 0)
        TransformAxis translation3: coordinates=pelvis_tz axis=(0 0 1) LinearFunction(coefficients=1 0)
    CustomJoint hip_r: socket_parent_frame=pelvis_offset socket_child_frame=femur_r_offset
      Coordinate hip_flexion_r: default_value=0 range=(-0.5235988 2.094395) clamped=true
      Coordinate hip_adduction_r: default_value=0 range=(-0.8726646 0.5235988) clamped=true
      Coordinate hip_rotation_r: default_value=0 range=(-0.6981317 0.6981317) clamped=true
      PhysicalOffsetFrame pelvis_offset: socket_parent=/bodyset/pelvis translation=(-0.056276 -0.07849 0.07726)
      PhysicalOffsetFrame femur_r_offset: socket_parent=/bodyset/femur_r translation=(0 0 0)
      SpatialTransform: axes_held_at_zero=(translation1 translation2 translation3)
        TransformAxis rotation1: coordinates=hip_flexion_r axis=(0 0 1) LinearFunction(coefficients=1 0)
        TransformAxis rotation2: coordinates=hip_adduction_r axis=(1 0 0) LinearFunction(coefficients=1 0)
        TransformAxis rotation3: coordinates=hip_rotation_r axis=(0 1 0) LinearFunction(coefficients=1 0)
    CustomJoint walker_knee_r: socket_parent_frame=femur_r_offset socket_child_frame=tibia_r_offset
      Coordinate knee_angle_r: default_value=0 range=(0 2.0944) clamped=true
      PhysicalOffsetFrame femur_r_offset: socket_parent=/bodyset/femur_r translation=(-0.00809 -0.40796 -0.00275)
          orientation=(-1.64157 1.44618 1.5708)
      PhysicalOffsetFrame tibia_r_offset: socket_parent=/bodyset/tibia_r
          translation=(-0.00808954 -0.0035348 -0.00148474) orientation=(-1.64157 1.44618 1.5708)
      SpatialTransform: axes_held_at_zero=translation3
        TransformAxis rotation1: coordinates=knee_angle_r axis=(1 0 0) LinearFunction(coefficients=1 0)
        TransformAxis rotation2: coordinates=knee_angle_r axis=(0 0 1)
          SimmSpline: x=(0 0.174533 0.349066 0.523599 0.698132 0.872665 1.0472 1.22173 1.39626 1.5708 1.74533 1.91986 2.0944)
              y=(0 0.0126809 0.0226969 0.0296054 0.0332049 0.0335354 0.0308779 0.0257548 0.0189295 0.011407 0.00443314 -0.00050475 -0.0016782)
        TransformAxis rotation3: coordinates=knee_angle_r axis=(0 1 0)
          SimmSpline: x=(0 0.174533 0.349066 0.523599 0.698132 0.872665 1.0472 1.22173 1.39626 1.5708 1.74533 1.91986 2.0944)
              y=(0 0.059461 0.109399 0.150618 0.18392 0.210107 0.229983 0.24435 0.254012 0.25977 0.262428 0.262788 0.261654)
        TransformAxis translation1: coordinates=knee_angle_r axis=(0 1 0)
          SimmSpline: x=(0 0.174533 0.349066 0.523599 0.698132 0.872665 1.0472 1.22173 1.39626 1.5708 1.74533 1.91986 2.0944)
              y=(0 0.000479 0.000835 0.001086 0.001251 0.001346 0.001391 0.001403 0.0014 0.0014 0.001421 0.001481 0.001599)
        TransformAxis translation2: coordinates=knee_angle_r axis=(0 0 1)
          SimmSpline: x=(0 0.174533 0.349066 0.523599 0.698132 0.872665 1.0472 1.22173 1.39626 1.5708 1.74533 1.91986 2.0944)
              y=(0 0.000988 0.001899 0.002734 0.003492 0.004173 0.004777 0.005305 0.005756 0.00613 0.006427 0.006648 0.006792)
    CustomJoint patellofemoral_r: socket_parent_frame=femur_r_offset socket_child_frame=patella_r_offset
      Coordinate knee_angle_r_beta: default_value=0 range=(-99999.9 99999.9) clamped=false
      PhysicalOffsetFrame femur_r_offset: socket_parent=/bodyset/femur_r translation=(-0.00809 -0.40796 -0.00275)
      PhysicalOffsetFrame patella_r_offset: socket_parent=/bodyset/patella_r translation=(0 0 0)
      SpatialTransform: axes_held_at_zero=(rotation2 rotation3)
        TransformAxis rotation1: coordinates=knee_angle_r_beta axis=(0 0 1)
          SimmSpline: x=(0 0.174533 0.349066 0.523599 0.698132 0.872665 1.0472 1.22173 1.39626 1.5708 1.74533 1.91986 2.0944)
              y=(0.00113686 -0.00629212 -0.105582 -0.253683 -0.414245 -0.579047 -0.747244 -0.91799 -1.09044 -1.26379 -1.43763 -1.61186 -1.78634)
        TransformAxis translation1: coordinates=knee_angle_r_beta axis=(1 0 0)
          SimmSpline: x=(0 0.174533 0.349066 0.523599 0.698132 0.872665 1.0472 1.22173 1.39626 1.5708 1.74533 1.91986 2.0944)
              y=(0.0524 0.0488 0.0437 0.0371 0.0296 0.0216 0.0136 0.0057 -0.0019 -0.0088 -0.0148 -0.0196 -0.0227)
        TransformAxis translation2: coordinates=knee_angle_r_beta axis=(0 1 0)
          SimmSpline: x=(0 0.174533 0.349066 0.523599 0.698132 0.872665 1.0472 1.22173 1.39626 1.5708 1.74533 1.91986 2.0944)
              y=(-0.0108 -0.019 -0.0263 -0.0322 -0.0367 -0.0395 -0.0408 -0.0404 -0.0384 -0.0349 -0.0301 -0.0245 -0.0187)
        TransformAxis translation3: axis=(0 0 1) Constant(value=0.00275)
    PinJoint ankle_r: socket_parent_frame=tibia_r_offset socket_child_frame=talus_r_offset
      Coordinate ankle_angle_r: default_value=0 range=(-0.6981317 0.5235988) clamped=true
      PhysicalOffsetFrame tibia_r_offset: socket_parent=/bodyset/tibia_r translation=(-0.01 -0.4 0)
          orientation=(0.175895 -0.105208 0.0186622)
      PhysicalOffsetFrame talus_r_offset: socket_parent=/bodyset/talus_r translation=(0 0 0)
          orientation=(0.175895 -0.105208 0.0186622)
    PinJoint subtalar_r: socket_parent_frame=talus_r_offset socket_child_frame=calcn_r_offset
      Coordinate subtalar_angle_r: default_value=0 range=(-0.3490659 0.3490659) clamped=true locked=true
      PhysicalOffsetFrame talus_r_offset: socket_parent=/bodyset/talus_r translation=(-0.04877 -0.04195 0.00792)
          orientation=(-1.76819 0.906223 1.8196)
      PhysicalOffsetFrame calcn_r_offset: socket_parent=/bodyset/calcn_r translation=(0 0 0)
          orientation=(-1.76819 0.906223 1.8196)
    PinJoint mtp_r: socket_parent_frame=calcn_r_offset socket_child_frame=toes_r_offset
      Coordinate mtp_angle_r: default_value=0 range=(-0.5235988 0.5235988) clamped=true locked=true
      PhysicalOffsetFrame calcn_r_offset: socket_parent=/bodyset/calcn_r translation=(0.1788 -0.002 0.00108)
          orientation=(-3.14159 0.619901 0)
      PhysicalOffsetFrame toes_r_offset: socket_parent=/bodyset/toes_r translation=(0 0 0)
          orientation=(-3.14159 0.619901 0)
    CustomJoint hip_l: socket_parent_frame=pelvis_offset socket_child_frame=femur_l_offset
      Coordinate hip_flexion_l: default_value=0 range=(-0.5235988 2.094395) clamped=true
      Coordinate hip_adduction_l: default_value=0 range=(-0.8726646 0.5235988) clamped=true
      Coordinate hip_rotation_l: default_value=0 range=(-0.6981317 0.6981317) clamped=true
      PhysicalOffsetFrame pelvis_offset: socket_parent=/bodyset/pelvis translation=(-0.056276 -0.07849 -0.07726)
      PhysicalOffsetFrame femur_l_offset: socket_parent=/bodyset/femur_l translation=(0 0 0)
      SpatialTransform: axes_held_at_zero=(translation1 translation2 translation3)
        TransformAxis rotation1: coordinates=hip_flexion_l axis=(0 0 1) LinearFunction(coefficients=1 0)
        TransformAxis rotation2: coordinates=hip_adduction_l axis=(1 0 0) LinearFunction(coefficients=-1 0)
        TransformAxis rotation3: coordinates=hip_rotation_l axis=(0 1 0) LinearFunction(coefficients=-1 0)
    CustomJoint walker_knee_l: socket_parent_frame=femur_l_offset socket_child_frame=tibia_l_offset
      Coordinate knee_angle_l: default_value=0 range=(0 2.0944) clamped=true
      PhysicalOffsetFrame femur_l_offset: socket_parent=/bodyset/femur_l translation=(-0.00809 -0.40796 0.00275)
          orientation=(1.64157 -1.44618 1.5708)
      PhysicalOffsetFrame tibia_l_offset: socket_parent=/bodyset/tibia_l
          translation=(-0.00808954 -0.0035348 0.00148474) orientation=(1.64157 -1.44618 1.5708)
      SpatialTransform: axes_held_at_zero=translation3
        TransformAxis rotation1: coordinates=knee_angle_l axis=(-1 0 0) LinearFunction(coefficients=1 0)
        TransformAxis rotation2: coordinates=knee_angle_l axis=(0 0 1)
          SimmSpline: x=(0 0.174533 0.349066 0.523599 0.698132 0.872665 1.0472 1.22173 1.39626 1.5708 1.74533 1.91986 2.0944)
              y=(0 0.0126809 0.0226969 0.0296054 0.0332049 0.0335354 0.0308779 0.0257548 0.0189295 0.011407 0.00443314 -0.00050475 -0.0016782)
        TransformAxis rotation3: coordinates=knee_angle_l axis=(0 1 0)
          SimmSpline: x=(0 0.174533 0.349066 0.523599 0.698132 0.872665 1.0472 1.22173 1.39626 1.5708 1.74533 1.91986 2.0944)
              y=(0 -0.059461 -0.109399 -0.150618 -0.18392 -0.210107 -0.229983 -0.24435 -0.254012 -0.25977 -0.262428 -0.262788 -0.261654)
        TransformAxis translation1: coordinates=knee_angle_l axis=(0 1 0)
          SimmSpline: x=(0 0.174533 0.349066 0.523599 0.698132 0.872665 1.0472 1.22173 1.39626 1.5708 1.74533 1.91986 2.0944)
              y=(0 0.000479 0.000835 0.001086 0.001251 0.001346 0.001391 0.001403 0.0014 0.0014 0.001421 0.001481 0.001599)
        TransformAxis translation2: coordinates=knee_angle_l axis=(0 0 1)
          SimmSpline: x=(0 0.174533 0.349066 0.523599 0.698132 0.872665 1.0472 1.22173 1.39626 1.5708 1.74533 1.91986 2.0944)
              y=(0 -0.000988 -0.001899 -0.002734 -0.003492 -0.004173 -0.004777 -0.005305 -0.005756 -0.00613 -0.006427 -0.006648 -0.006792)
    CustomJoint patellofemoral_l: socket_parent_frame=femur_l_offset socket_child_frame=patella_l_offset
      Coordinate knee_angle_l_beta: default_value=0 range=(-99999.9 99999.9) clamped=false
      PhysicalOffsetFrame femur_l_offset: socket_parent=/bodyset/femur_l translation=(-0.00809 -0.40796 0.00275)
      PhysicalOffsetFrame patella_l_offset: socket_parent=/bodyset/patella_l translation=(0 0 0)
      SpatialTransform: axes_held_at_zero=(rotation2 rotation3)
        TransformAxis rotation1: coordinates=knee_angle_l_beta axis=(0 0 1)
          SimmSpline: x=(0 0.174533 0.349066 0.523599 0.698132 0.872665 1.0472 1.22173 1.39626 1.5708 1.74533 1.91986 2.0944)
              y=(0.00113686 -0.00629212 -0.105582 -0.253683 -0.414245 -0.579047 -0.747244 -0.91799 -1.09044 -1.26379 -1.43763 -1.61186 -1.78634)
        TransformAxis translation1: coordinates=knee_angle_l_beta axis=(1 0 0)
          SimmSpline: x=(0 0.174533 0.349066 0.523599 0.698132 0.872665 1.0472 1.22173 1.39626 1.5708 1.74533 1.91986 2.0944)
              y=(0.0524 0.0488 0.0437 0.0371 0.0296 0.0216 0.0136 0.0057 -0.0019 -0.0088 -0.0148 -0.0196 -0.0227)
        TransformAxis translation2: coordinates=knee_angle_l_beta axis=(0 1 0)
          SimmSpline: x=(0 0.174533 0.349066 0.523599 0.698132 0.872665 1.0472 1.22173 1.39626 1.5708 1.74533 1.91986 2.0944)
              y=(-0.0108 -0.019 -0.0263 -0.0322 -0.0367 -0.0395 -0.0408 -0.0404 -0.0384 -0.0349 -0.0301 -0.0245 -0.0187)
        TransformAxis translation3: axis=(0 0 1) Constant(value=-0.00275)
    PinJoint ankle_l: socket_parent_frame=tibia_l_offset socket_child_frame=talus_l_offset
      Coordinate ankle_angle_l: default_value=0 range=(-0.6981317 0.5235988) clamped=true
      PhysicalOffsetFrame tibia_l_offset: socket_parent=/bodyset/tibia_l translation=(-0.01 -0.4 0)
          orientation=(-0.175895 0.105208 0.0186622)
      PhysicalOffsetFrame talus_l_offset: socket_parent=/bodyset/talus_l translation=(0 0 0)
          orientation=(-0.175895 0.105208 0.0186622)
    PinJoint subtalar_l: socket_parent_frame=talus_l_offset socket_child_frame=calcn_l_offset
      Coordinate subtalar_angle_l: default_value=0 range=(-0.3490659 0.3490659) clamped=true locked=true
      PhysicalOffsetFrame talus_l_offset: socket_parent=/bodyset/talus_l translation=(-0.04877 -0.04195 -0.00792)
          orientation=(1.76819 -0.906223 1.8196)
      PhysicalOffsetFrame calcn_l_offset: socket_parent=/bodyset/calcn_l translation=(0 0 0)
          orientation=(1.76819 -0.906223 1.8196)
    PinJoint mtp_l: socket_parent_frame=calcn_l_offset socket_child_frame=toes_l_offset
      Coordinate mtp_angle_l: default_value=0 range=(-0.5235988 0.5235988) clamped=true locked=true
      PhysicalOffsetFrame calcn_l_offset: socket_parent=/bodyset/calcn_l translation=(0.1788 -0.002 -0.00108)
          orientation=(-3.14159 -0.619901 0)
      PhysicalOffsetFrame toes_l_offset: socket_parent=/bodyset/toes_l translation=(0 0 0)
          orientation=(-3.14159 -0.619901 0)
    CustomJoint back: socket_parent_frame=pelvis_offset socket_child_frame=torso_offset
      Coordinate lumbar_extension: default_value=0 range=(-1.570796 1.570796) clamped=true
      Coordinate lumbar_bending: default_value=0 range=(-1.570796 1.570796) clamped=true
      Coordinate lumbar_rotation: default_value=0 range=(-1.570796 1.570796) clamped=true
      PhysicalOffsetFrame pelvis_offset: socket_parent=/bodyset/pelvis translation=(-0.1007 0.0815 0)
      PhysicalOffsetFrame torso_offset: socket_parent=/bodyset/torso translation=(0 0 0)
      SpatialTransform: axes_held_at_zero=(translation1 translation2 translation3)
        TransformAxis rotation1: coordinates=lumbar_extension axis=(0 0 1) LinearFunction(coefficients=1 0)
        TransformAxis rotation2: coordinates=lumbar_bending axis=(1 0 0) LinearFunction(coefficients=1 0)
        TransformAxis rotation3: coordinates=lumbar_rotation axis=(0 1 0) LinearFunction(coefficients=1 0)
    CustomJoint acromial_r: socket_parent_frame=torso_offset socket_child_frame=humerus_r_offset
      Coordinate arm_flex_r: default_value=0 range=(-1.570796 1.570796) clamped=true
      Coordinate arm_add_r: default_value=0 range=(-2.094395 1.570796) clamped=true
      Coordinate arm_rot_r: default_value=0 range=(-1.570796 1.570796) clamped=true
      PhysicalOffsetFrame torso_offset: socket_parent=/bodyset/torso translation=(0.003155 0.3715 0.17)
      PhysicalOffsetFrame humerus_r_offset: socket_parent=/bodyset/humerus_r translation=(0 0 0)
      SpatialTransform: axes_held_at_zero=(translation1 translation2 translation3)
        TransformAxis rotation1: coordinates=arm_flex_r axis=(0 0 1) LinearFunction(coefficients=1 0)
        TransformAxis rotation2: coordinates=arm_add_r axis=(1 0 0) LinearFunction(coefficients=1 0)
        TransformAxis rotation3: coordinates=arm_rot_r axis=(0 1 0) LinearFunction(coefficients=1 0)
    PinJoint elbow_r: socket_parent_frame=humerus_r_offset socket_child_frame=ulna_r_offset
      Coordinate elbow_flex_r: default_value=0 range=(0 2.618) clamped=true
      PhysicalOffsetFrame humerus_r_offset: socket_parent=/bodyset/humerus_r translation=(0.013144 -0.286273 -0.009595)
          orientation=(-0.0228627 0.228018 0.0051689)
      PhysicalOffsetFrame ulna_r_offset: socket_parent=/bodyset/ulna_r translation=(0 0 0)
          orientation=(-0.0228627 0.228018 0.0051689)
    PinJoint radioulnar_r: socket_parent_frame=ulna_r_offset socket_child_frame=radius_r_offset
      Coordinate pro_sup_r: default_value=0 range=(0 1.570796) clamped=true
      PhysicalOffsetFrame ulna_r_offset: socket_parent=/bodyset/ulna_r translation=(-0.006727 -0.013007 0.026083)
          orientation=(-1.56884 0.056428 1.53614)
      PhysicalOffsetFrame radius_r_offset: socket_parent=/bodyset/radius_r translation=(0 0 0)
          orientation=(-1.56884 0.056428 1.53614)
    UniversalJoint radius_hand_r: socket_parent_frame=radius_r_offset socket_child_frame=hand_r_offset
      Coordinate wrist_flex_r: default_value=0 range=(-1.22173 1.22173) clamped=true locked=true
      Coordinate wrist_dev_r: default_value=0 range=(-0.4363323 0.6108652) clamped=true locked=true
      PhysicalOffsetFrame radius_r_offset: socket_parent=/bodyset/radius_r translation=(-0.008797 -0.235841 0.01361)
          orientation=(-1.5708 0 -1.5708)
      PhysicalOffsetFrame hand_r_offset: socket_parent=/bodyset/hand_r translation=(0 0 0)
          orientation=(-1.5708 0 -1.5708)
    CustomJoint acromial_l: socket_parent_frame=torso_offset socket_child_frame=humerus_l_offset
      Coordinate arm_flex_l: default_value=0 range=(-1.570796 1.570796) clamped=true
      Coordinate arm_add_l: default_value=0 range=(-2.094395 1.570796) clamped=true
      Coordinate arm_rot_l: default_value=0 range=(-1.570796 1.570796) clamped=true
      PhysicalOffsetFrame torso_offset: socket_parent=/bodyset/torso translation=(0.003155 0.3715 -0.17)
      PhysicalOffsetFrame humerus_l_offset: socket_parent=/bodyset/humerus_l translation=(0 0 0)
      SpatialTransform: axes_held_at_zero=(translation1 translation2 translation3)
        TransformAxis rotation1: coordinates=arm_flex_l axis=(0 0 1) LinearFunction(coefficients=1 0)
        TransformAxis rotation2: coordinates=arm_add_l axis=(-1 0 0) LinearFunction(coefficients=1 0)
        TransformAxis rotation3: coordinates=arm_rot_l axis=(0 -1 0) LinearFunction(coefficients=1 0)
    PinJoint elbow_l: socket_parent_frame=humerus_l_offset socket_child_frame=ulna_l_offset
      Coordinate elbow_flex_l: default_value=0 range=(0 2.618) clamped=true
      PhysicalOffsetFrame humerus_l_offset: socket_parent=/bodyset/humerus_l translation=(0.013144 -0.286273 0.009595)
          orientation=(0.0228627 -0.228018 0.0051689)
      PhysicalOffsetFrame ulna_l_offset: socket_parent=/bodyset/ulna_l translation=(0 0 0)
          orientation=(0.0228627 -0.228018 0.0051689)
    PinJoint radioulnar_l: socket_parent_frame=ulna_l_offset socket_child_frame=radius_l_offset
      Coordinate pro_sup_l: default_value=0 range=(0 1.570796) clamped=true
      PhysicalOffsetFrame ulna_l_offset: socket_parent=/bodyset/ulna_l translation=(-0.006727 -0.013007 -0.026083)
          orientation=(1.56884 -0.056428 1.53614)
      PhysicalOffsetFrame radius_l_offset: socket_parent=/bodyset/radius_l translation=(0 0 0)
          orientation=(1.56884 -0.056428 1.53614)
    UniversalJoint radius_hand_l: socket_parent_frame=radius_l_offset socket_child_frame=hand_l_offset
      Coordinate wrist_flex_l: default_value=0 range=(-1.22173 1.22173) clamped=true locked=true
      Coordinate wrist_dev_l: default_value=0 range=(-0.4363323 0.6108652) clamped=true locked=true
      PhysicalOffsetFrame radius_l_offset: socket_parent=/bodyset/radius_l translation=(-0.008797 -0.235841 -0.01361)
          orientation=(1.5708 0 1.5708)
      PhysicalOffsetFrame hand_l_offset: socket_parent=/bodyset/hand_l translation=(0 0 0)
          orientation=(1.5708 0 1.5708)
  ConstraintSet:
    CoordinateCouplerConstraint patellofemoral_knee_angle_r_con: independent_coordinate_names=knee_angle_r
        dependent_coordinate_name=knee_angle_r_beta scale_factor=1
        coupled_coordinates_function=LinearFunction(coefficients=1 0)
    CoordinateCouplerConstraint patellofemoral_knee_angle_l_con: independent_coordinate_names=knee_angle_l
        dependent_coordinate_name=knee_angle_l_beta scale_factor=1
        coupled_coordinates_function=LinearFunction(coefficients=1 0)
  ForceSet:
    CoordinateActuator lumbar_ext: coordinate=lumbar_extension optimal_force=10
    CoordinateActuator lumbar_bend: coordinate=lumbar_bending optimal_force=10
    CoordinateActuator lumbar_rot: coordinate=lumbar_rotation optimal_force=10
    CoordinateActuator shoulder_flex_r: coordinate=arm_flex_r optimal_force=10
    CoordinateActuator shoulder_add_r: coordinate=arm_add_r optimal_force=10
    CoordinateActuator shoulder_rot_r: coordinate=arm_rot_r optimal_force=10
    CoordinateActuator elbow_flex_r: coordinate=elbow_flex_r optimal_force=10
    CoordinateActuator pro_sup_r: coordinate=pro_sup_r optimal_force=10
    CoordinateActuator wrist_flex_r: coordinate=wrist_flex_r optimal_force=10
    CoordinateActuator wrist_dev_r: coordinate=wrist_dev_r optimal_force=10
    CoordinateActuator shoulder_flex_l: coordinate=arm_flex_l optimal_force=10
    CoordinateActuator shoulder_add_l: coordinate=arm_add_l optimal_force=10
    CoordinateActuator shoulder_rot_l: coordinate=arm_rot_l optimal_force=10
    CoordinateActuator elbow_flex_l: coordinate=elbow_flex_l optimal_force=10
    CoordinateActuator pro_sup_l: coordinate=pro_sup_l optimal_force=10
    CoordinateActuator wrist_flex_l: coordinate=wrist_flex_l optimal_force=10
    CoordinateActuator wrist_dev_l: coordinate=wrist_dev_l optimal_force=10
    ObjectGroup right_leg
    ObjectGroup left_leg
    ObjectGroup hip_add_r
    ObjectGroup hip_abd_r
    ObjectGroup hip_flex_r
    ObjectGroup hip_ext_r
    ObjectGroup hip_inrot_r
    ObjectGroup hip_exrot_r
    ObjectGroup knee_flex_r
    ObjectGroup knee_ext_r
    ObjectGroup ankle_df_r
    ObjectGroup ankle_pf_r
    ObjectGroup everter_r
    ObjectGroup inverter_r
    ObjectGroup hip_add_l
    ObjectGroup hip_abd_l
    ObjectGroup hip_flex_l
    ObjectGroup hip_ext_l
    ObjectGroup hip_exrot_l
    ObjectGroup hip_inrot_l
    ObjectGroup knee_flex_l
    ObjectGroup knee_ext_l
    ObjectGroup ankle_df_l
    ObjectGroup ankle_pf_l
    ObjectGroup everter_l
    ObjectGroup inverter_l
  MarkerSet:
    Marker RACR: torso (-0.003 0.4440745 0.1627938)
    Marker LACR: torso (-0.004654853 0.4401534 -0.1968973)
    Marker C7: torso (-0.085 0.4522784 0.00165426)
    Marker STER: torso (0.04749429 0.3755486 0.001985315)
    Marker RUA1: humerus_r (-0.02353416 -0.1089745 -0.01801153)
    Marker RUA2: humerus_r (-0.02527138 -0.1031503 0.02570872)
    Marker RUA3: humerus_r (-0.02470972 -0.1478337 0.02511456)
    Marker RFA1: radius_r (-0.02062877 -0.1579688 0.02718504)
    Marker RRSP: radius_r (0.0005 -0.225 0.05)
    Marker RUSP: radius_r (-0.022 -0.225 -0.022)
    Marker LUA1: humerus_l (-0.02754263 -0.1016125 -0.02678521)
    Marker LUA4: humerus_l (-0.02573309 -0.1543527 -0.02556389)
    Marker LUA3: humerus_l (-0.01932306 -0.146932 0.02542987)
    Marker LHLE: humerus_l (-0.0162947 -0.28 0.004275436)
    Marker LFA1: radius_l (-0.03307332 -0.1633931 -0.02886474)
    Marker LRSP: radius_l (0.0005 -0.225 -0.05)
    Marker LUSP: radius_l (-0.022 -0.225 0.022)
    Marker RASIS: pelvis (0.00953047 0.0180816 0.128464)
    Marker LASIS: pelvis (0.00953047 0.0180816 -0.128464)
    Marker RPSIS: pelvis (-0.155 0.035 0.045)
    Marker LPSIS: pelvis (-0.155 0.035 -0.045)
    Marker RTH1: femur_r (-0.009704114 -0.1924847 0.07561978)
    Marker RTH2: femur_r (0.04383515 -0.1912616 0.0706889)
    Marker RTH3: femur_r (0.04144143 -0.2723741 0.06717324)
    Marker RFLE: femur_r (0 -0.404 0.05)
    Marker RFME: femur_r (0 -0.404 -0.05)
    Marker RSK1: tibia_r (-0.01535722 -0.1350127 0.05359929)
    Marker RSK2: tibia_r (0.03478395 -0.1354446 0.05264357)
    Marker RSK4: tibia_r (-0.01649925 -0.190491 0.05563615)
    Marker RFAL: tibia_r (-0.005 -0.4051024 0.053)
    Marker RTAM: tibia_r (0.006 -0.3888 -0.038)
    Marker RFCC: calcn_r (-0.025 0.02 -0.005)
    Marker LTH1: femur_l (0.04261649 -0.2085854 -0.07035882)
    Marker LTH2: femur_l (-0.01472362 -0.2087204 -0.06566144)
    Marker LTH3: femur_l (-0.01881999 -0.292637 -0.06513241)
    Marker LFLE: femur_l (0 -0.404 -0.05)
    Marker LFME: femur_l (0 -0.404 0.05)
    Marker LSK1: tibia_l (0.0267701 -0.1423274 -0.05333397)
    Marker LSK2: tibia_l (-0.02345804 -0.1476141 -0.04441528)
    Marker LSK3: tibia_l (-0.02338592 -0.2030472 -0.06136068)
    Marker LFAL: tibia_l (-0.005 -0.399471 -0.053)
    Marker LTAM: tibia_l (0.006 -0.3888 0.038)
    Marker LFCC: calcn_l (-0.025 0.02 0.005)
    Marker XPRO: torso (0.1165682 0.2323189 -0.0002817169)
    Marker T4: torso (-0.1052096 0.3446583 0.0005576274)
    Marker T8: torso (-0.115098 0.2476391 0.0004471404)
    Marker T10: torso (-0.1059094 0.19575 0.0005861879)
    Marker RHME: humerus_r (0.04303875 -0.2735082 -0.06069349)
    Marker RHLE: humerus_r (-0.01790884 -0.28 -0.008154637)
    Marker LHME: humerus_l (0.03899232 -0.2664217 0.07373212)
    Marker RTEMP: torso (0.05191243 0.5930127 0.06546593)
    Marker LTEMP: torso (0.05361207 0.5909714 -0.06114695)
    Marker RHEAD: torso (0.08775295 0.60357 0.02234055)
    Marker LHEAD: torso (0.08507691 0.6017967 -0.0210064)
    Marker RICR: pelvis (-0.1110066 0.09783551 0.1315069)
    Marker LICR: pelvis (-0.09066688 0.09365548 -0.1343373)
    Marker LUA2: humerus_l (-0.02465692 -0.1096962 0.01510835)
    Marker RUA4: humerus_r (-0.02555405 -0.1519068 -0.01969667)
    Marker LFA2: ulna_l (-0.05342332 -0.1674098 -0.01317968)
    Marker LFA3: radius_l (-0.04081415 -0.1925753 -0.007318294)
    Marker RFA2: ulna_r (-0.04824988 -0.180348 0.01646709)
    Marker RFA3: radius_r (-0.03367275 -0.1982053 0.01727627)
    Marker RTH4: femur_r (-0.01673003 -0.2706077 0.06918237)
    Marker LTH4: femur_l (0.03525558 -0.2903142 -0.06943175)
    Marker RSK3: tibia_r (0.03546154 -0.1972744 0.05139194)
    Marker LSK4: tibia_l (0.02739084 -0.2099703 -0.04891357)
    Marker RFMT1: calcn_r (0.185378 0.01862883 -0.02622646)
    Marker RFMT2: calcn_r (0.1797485 0.01514865 0.002352285)
    Marker RFMT5: calcn_r (0.1400339 0.01797807 0.04171759)
    Marker LFMT1: calcn_l (0.179664 0.02148962 0.02721203)
    Marker LFMT2: calcn_l (0.1774792 0.01577402 -0.001397294)
    Marker LFMT5: calcn_l (0.1406686 0.01678265 -0.04065561)
  ComponentSet:
    IMU humerus_r_imu: socket_frame=/bodyset/humerus_r/humerus_r_imu
    IMU humerus_l_imu: socket_frame=/bodyset/humerus_l/humerus_l_imu
    IMU ulna_r_imu: socket_frame=/bodyset/ulna_r/ulna_r_imu
    IMU ulna_l_imu: socket_frame=/bodyset/ulna_l/ulna_l_imu
    IMU ulna_l_imu2_0deg: socket_frame=/bodyset/ulna_l/ulna_l_imu2_0deg_frame
    IMU ulna_l_imu2_30deg: socket_frame=/bodyset/ulna_l/ulna_l_imu2_30deg_frame
    IMU ulna_l_imu2_-30deg: socket_frame=/bodyset/ulna_l/ulna_l_imu2_-30deg_frame
    IMU ulna_l_imu3_0deg: socket_frame=/bodyset/ulna_l/ulna_l_imu3_0deg_frame
    IMU ulna_l_imu3_30deg: socket_frame=/bodyset/ulna_l/ulna_l_imu3_30deg_frame
    IMU ulna_l_imu3_-30deg: socket_frame=/bodyset/ulna_l/ulna_l_imu3_-30deg_frame
    IMU ulna_l_imu4_0deg: socket_frame=/bodyset/ulna_l/ulna_l_imu4_0deg_frame
    IMU ulna_l_imu4_30deg: socket_frame=/bodyset/ulna_l/ulna_l_imu4_30deg_frame
    IMU ulna_l_imu4_-30deg: socket_frame=/bodyset/ulna_l/ulna_l_imu4_-30deg_frame
    IMU ulna_l_imu5_0deg: socket_frame=/bodyset/ulna_l/ulna_l_imu5_0deg_frame
    IMU ulna_l_imu5_30deg: socket_frame=/bodyset/ulna_l/ulna_l_imu5_30deg_frame
    IMU ulna_l_imu5_-30deg: socket_frame=/bodyset/ulna_l/ulna_l_imu5_-30deg_frame
    IMU ulna_l_imu6_0deg: socket_frame=/bodyset/ulna_l/ulna_l_imu6_0deg_frame
    IMU ulna_l_imu6_30deg: socket_frame=/bodyset/ulna_l/ulna_l_imu6_30deg_frame
    IMU ulna_l_imu6_-30deg: socket_frame=/bodyset/ulna_l/ulna_l_imu6_-30deg_frame
    IMU ulna_l_imu7_0deg: socket_frame=/bodyset/ulna_l/ulna_l_imu7_0deg_frame
    IMU ulna_l_imu7_30deg: socket_frame=/bodyset/ulna_l/ulna_l_imu7_30deg_frame
    IMU ulna_l_imu7_-30deg: socket_frame=/bodyset/ulna_l/ulna_l_imu7_-30deg_frame
    IMU ulna_l_imu8_0deg: socket_frame=/bodyset/ulna_l/ulna_l_imu8_0deg_frame
    IMU ulna_l_imu8_30deg: socket_frame=/bodyset/ulna_l/ulna_l_imu8_30deg_frame
    IMU ulna_l_imu8_-30deg: socket_frame=/bodyset/ulna_l/ulna_l_imu8_-30deg_frame
    IMU ulna_l_imu9_0deg: socket_frame=/bodyset/ulna_l/ulna_l_imu9_0deg_frame
    IMU ulna_l_imu9_30deg: socket_frame=/bodyset/ulna_l/ulna_l_imu9_30deg_frame
    IMU ulna_l_imu9_-30deg: socket_frame=/bodyset/ulna_l/ulna_l_imu9_-30deg_frame
    IMU ulna_l_imu10_0deg: socket_frame=/bodyset/ulna_l/ulna_l_imu10_0deg_frame
    IMU ulna_l_imu10_30deg: socket_frame=/bodyset/ulna_l/ulna_l_imu10_30deg_frame
    IMU ulna_l_imu10_-30deg: socket_frame=/bodyset/ulna_l/ulna_l_imu10_-30deg_frame
    IMU ulna_l_imu11_0deg: socket_frame=/bodyset/ulna_l/ulna_l_imu11_0deg_frame
    IMU ulna_l_imu11_30deg: socket_frame=/bodyset/ulna_l/ulna_l_imu11_30deg_frame
    IMU ulna_l_imu11_-30deg: socket_frame=/bodyset/ulna_l/ulna_l_imu11_-30deg_frame
    IMU ulna_l_imu12_0deg: socket_frame=/bodyset/ulna_l/ulna_l_imu12_0deg_frame
    IMU ulna_l_imu12_30deg: socket_frame=/bodyset/ulna_l/ulna_l_imu12_30deg_frame
    IMU ulna_l_imu12_-30deg: socket_frame=/bodyset/ulna_l/ulna_l_imu12_-30deg_frame
    IMU ulna_l_imu13_0deg: socket_frame=/bodyset/ulna_l/ulna_l_imu13_0deg_frame
    IMU ulna_l_imu13_30deg: socket_frame=/bodyset/ulna_l/ulna_l_imu13_30deg_frame
    IMU ulna_l_imu13_-30deg: socket_frame=/bodyset/ulna_l/ulna_l_imu13_-30deg_frame
    IMU ulna_l_imu14_0deg: socket_frame=/bodyset/ulna_l/ulna_l_imu14_0deg_frame
    IMU ulna_l_imu14_30deg: socket_frame=/bodyset/ulna_l/ulna_l_imu14_30deg_frame
    IMU ulna_l_imu14_-30deg: socket_frame=/bodyset/ulna_l/ulna_l_imu14_-30deg_frame
    IMU ulna_l_imu15_0deg: socket_frame=/bodyset/ulna_l/ulna_l_imu15_0deg_frame
    IMU ulna_l_imu15_30deg: socket_frame=/bodyset/ulna_l/ulna_l_imu15_30deg_frame
    IMU ulna_l_imu15_-30deg: socket_frame=/bodyset/ulna_l/ulna_l_imu15_-30deg_frame
    IMU ulna_l_imu16_0deg: socket_frame=/bodyset/ulna_l/ulna_l_imu16_0deg_frame
    IMU ulna_l_imu16_30deg: socket_frame=/bodyset/ulna_l/ulna_l_imu16_30deg_frame
    IMU ulna_l_imu16_-30deg: socket_frame=/bodyset/ulna_l/ulna_l_imu16_-30deg_frame
    IMU ulna_l_imu17_0deg: socket_frame=/bodyset/ulna_l/ulna_l_imu17_0deg_frame
    IMU ulna_l_imu17_30deg: socket_frame=/bodyset/ulna_l/ulna_l_imu17_30deg_frame
    IMU ulna_l_imu17_-30deg: socket_frame=/bodyset/ulna_l/ulna_l_imu17_-30deg_frame
    IMU ulna_l_imu18_0deg: socket_frame=/bodyset/ulna_l/ulna_l_imu18_0deg_frame
    IMU ulna_l_imu18_30deg: socket_frame=/bodyset/ulna_l/ulna_l_imu18_30deg_frame
    IMU ulna_l_imu18_-30deg: socket_frame=/bodyset/ulna_l/ulna_l_imu18_-30deg_frame
    IMU ulna_l_imu19_0deg: socket_frame=/bodyset/ulna_l/ulna_l_imu19_0deg_frame
    IMU ulna_l_imu19_30deg: socket_frame=/bodyset/ulna_l/ulna_l_imu19_30deg_frame
    IMU ulna_l_imu19_-30deg: socket_frame=/bodyset/ulna_l/ulna_l_imu19_-30deg_frame
    IMU ulna_l_imu20_0deg: socket_frame=/bodyset/ulna_l/ulna_l_imu20_0deg_frame
    IMU ulna_l_imu20_30deg: socket_frame=/bodyset/ulna_l/ulna_l_imu20_30deg_frame
    IMU ulna_l_imu20_-30deg: socket_frame=/bodyset/ulna_l/ulna_l_imu20_-30deg_frame
    IMU ulna_l_imu21_0deg: socket_frame=/bodyset/ulna_l/ulna_l_imu21_0deg_frame
    IMU ulna_l_imu21_30deg: socket_frame=/bodyset/ulna_l/ulna_l_imu21_30deg_frame
    IMU ulna_l_imu21_-30deg: socket_frame=/bodyset/ulna_l/ulna_l_imu21_-30deg_frame
    IMU ulna_l_imu22_0deg: socket_frame=/bodyset/ulna_l/ulna_l_imu22_0deg_frame
    IMU ulna_l_imu22_30deg: socket_frame=/bodyset/ulna_l/ulna_l_imu22_30deg_frame
    IMU ulna_l_imu22_-30deg: socket_frame=/bodyset/ulna_l/ulna_l_imu22_-30deg_frame
    IMU ulna_l_imu23_0deg: socket_frame=/bodyset/ulna_l/ulna_l_imu23_0deg_frame
    IMU ulna_l_imu23_30deg: socket_frame=/bodyset/ulna_l/ulna_l_imu23_30deg_frame
    IMU ulna_l_imu23_-30deg: socket_frame=/bodyset/ulna_l/ulna_l_imu23_-30deg_frame
    IMU ulna_l_imu24_0deg: socket_frame=/bodyset/ulna_l/ulna_l_imu24_0deg_frame
    IMU ulna_l_imu24_30deg: socket_frame=/bodyset/ulna_l/ulna_l_imu24_30deg_frame
    IMU ulna_l_imu24_-30deg: socket_frame=/bodyset/ulna_l/ulna_l_imu24_-30deg_frame
    IMU ulna_l_imu25_0deg: socket_frame=/bodyset/ulna_l/ulna_l_imu25_0deg_frame
    IMU ulna_l_imu25_30deg: socket_frame=/bodyset/ulna_l/ulna_l_imu25_30deg_frame
    IMU ulna_l_imu25_-30deg: socket_frame=/bodyset/ulna_l/ulna_l_imu25_-30deg_frame
    IMU ulna_l_imu26_0deg: socket_frame=/bodyset/ulna_l/ulna_l_imu26_0deg_frame
    IMU ulna_l_imu26_30deg: socket_frame=/bodyset/ulna_l/ulna_l_imu26_30deg_frame
    IMU ulna_l_imu26_-30deg: socket_frame=/bodyset/ulna_l/ulna_l_imu26_-30deg_frame
    IMU ulna_l_imu27_0deg: socket_frame=/bodyset/ulna_l/ulna_l_imu27_0deg_frame
    IMU ulna_l_imu27_30deg: socket_frame=/bodyset/ulna_l/ulna_l_imu27_30deg_frame
    IMU ulna_l_imu27_-30deg: socket_frame=/bodyset/ulna_l/ulna_l_imu27_-30deg_frame
    IMU ulna_l_imu28_0deg: socket_frame=/bodyset/ulna_l/ulna_l_imu28_0deg_frame
    IMU ulna_l_imu28_30deg: socket_frame=/bodyset/ulna_l/ulna_l_imu28_30deg_frame
    IMU ulna_l_imu28_-30deg: socket_frame=/bodyset/ulna_l/ulna_l_imu28_-30deg_frame
    IMU ulna_l_imu29_0deg: socket_frame=/bodyset/ulna_l/ulna_l_imu29_0deg_frame
    IMU ulna_l_imu29_30deg: socket_frame=/bodyset/ulna_l/ulna_l_imu29_30deg_frame
    IMU ulna_l_imu29_-30deg: socket_frame=/bodyset/ulna_l/ulna_l_imu29_-30deg_frame
    IMU ulna_l_imu30_0deg: socket_frame=/bodyset/ulna_l/ulna_l_imu30_0deg_frame
    IMU ulna_l_imu30_30deg: socket_frame=/bodyset/ulna_l/ulna_l_imu30_30deg_frame
    IMU ulna_l_imu30_-30deg: socket_frame=/bodyset/ulna_l/ulna_l_imu30_-30deg_frame
    IMU ulna_l_imu31_0deg: socket_frame=/bodyset/ulna_l/ulna_l_imu31_0deg_frame
    IMU ulna_l_imu31_30deg: socket_frame=/bodyset/ulna_l/ulna_l_imu31_30deg_frame
    IMU ulna_l_imu31_-30deg: socket_frame=/bodyset/ulna_l/ulna_l_imu31_-30deg_frame
    IMU ulna_r_imu2_0deg: socket_frame=/bodyset/ulna_r/ulna_r_imu2_0deg_frame
    IMU ulna_r_imu2_30deg: socket_frame=/bodyset/ulna_r/ulna_r_imu2_30deg_frame
    IMU ulna_r_imu2_-30deg: socket_frame=/bodyset/ulna_r/ulna_r_imu2_-30deg_frame
    IMU ulna_r_imu3_0deg: socket_frame=/bodyset/ulna_r/ulna_r_imu3_0deg_frame
    IMU ulna_r_imu3_30deg: socket_frame=/bodyset/ulna_r/ulna_r_imu3_30deg_frame
    IMU ulna_r_imu3_-30deg: socket_frame=/bodyset/ulna_r/ulna_r_imu3_-30deg_frame
    IMU ulna_r_imu4_0deg: socket_frame=/bodyset/ulna_r/ulna_r_imu4_0deg_frame
    IMU ulna_r_imu4_30deg: socket_frame=/bodyset/ulna_r/ulna_r_imu4_30deg_frame
    IMU ulna_r_imu4_-30deg: socket_frame=/bodyset/ulna_r/ulna_r_imu4_-30deg_frame
    IMU ulna_r_imu5_0deg: socket_frame=/bodyset/ulna_r/ulna_r_imu5_0deg_frame
    IMU ulna_r_imu5_30deg: socket_frame=/bodyset/ulna_r/ulna_r_imu5_30deg_frame
    IMU ulna_r_imu5_-30deg: socket_frame=/bodyset/ulna_r/ulna_r_imu5_-30deg_frame
    IMU ulna_r_imu6_0deg: socket_frame=/bodyset/ulna_r/ulna_r_imu6_0deg_frame
    IMU ulna_r_imu6_30deg: socket_frame=/bodyset/ulna_r/ulna_r_imu6_30deg_frame
    IMU ulna_r_imu6_-30deg: socket_frame=/bodyset/ulna_r/ulna_r_imu6_-30deg_frame
    IMU ulna_r_imu7_0deg: socket_frame=/bodyset/ulna_r/ulna_r_imu7_0deg_frame
    IMU ulna_r_imu7_30deg: socket_frame=/bodyset/ulna_r/ulna_r_imu7_30deg_frame
    IMU ulna_r_imu7_-30deg: socket_frame=/bodyset/ulna_r/ulna_r_imu7_-30deg_frame
    IMU ulna_r_imu8_0deg: socket_frame=/bodyset/ulna_r/ulna_r_imu8_0deg_frame
    IMU ulna_r_imu8_30deg: socket_frame=/bodyset/ulna_r/ulna_r_imu8_30deg_frame
    IMU ulna_r_imu8_-30deg: socket_frame=/bodyset/ulna_r/ulna_r_imu8_-30deg_frame
    IMU ulna_r_imu9_0deg: socket_frame=/bodyset/ulna_r/ulna_r_imu9_0deg_frame
    IMU ulna_r_imu9_30deg: socket_frame=/bodyset/ulna_r/ulna_r_imu9_30deg_frame
    IMU ulna_r_imu9_-30deg: socket_frame=/bodyset/ulna_r/ulna_r_imu9_-30deg_frame
    IMU ulna_r_imu10_0deg: socket_frame=/bodyset/ulna_r/ulna_r_imu10_0deg_frame
    IMU ulna_r_imu10_30deg: socket_frame=/bodyset/ulna_r/ulna_r_imu10_30deg_frame
    IMU ulna_r_imu10_-30deg: socket_frame=/bodyset/ulna_r/ulna_r_imu10_-30deg_frame
    IMU ulna_r_imu11_0deg: socket_frame=/bodyset/ulna_r/ulna_r_imu11_0deg_frame
    IMU ulna_r_imu11_30deg: socket_frame=/bodyset/ulna_r/ulna_r_imu11_30deg_frame
    IMU ulna_r_imu11_-30deg: socket_frame=/bodyset/ulna_r/ulna_r_imu11_-30deg_frame
    IMU ulna_r_imu12_0deg: socket_frame=/bodyset/ulna_r/ulna_r_imu12_0deg_frame
    IMU ulna_r_imu12_30deg: socket_frame=/bodyset/ulna_r/ulna_r_imu12_30deg_frame
    IMU ulna_r_imu12_-30deg: socket_frame=/bodyset/ulna_r/ulna_r_imu12_-30deg_frame
    IMU ulna_r_imu13_0deg: socket_frame=/bodyset/ulna_r/ulna_r_imu13_0deg_frame
    IMU ulna_r_imu13_30deg: socket_frame=/bodyset/ulna_r/ulna_r_imu13_30deg_frame
    IMU ulna_r_imu13_-30deg: socket_frame=/bodyset/ulna_r/ulna_r_imu13_-30deg_frame
    IMU ulna_r_imu14_0deg: socket_frame=/bodyset/ulna_r/ulna_r_imu14_0deg_frame
    IMU ulna_r_imu14_30deg: socket_frame=/bodyset/ulna_r/ulna_r_imu14_30deg_frame
    IMU ulna_r_imu14_-30deg: socket_frame=/bodyset/ulna_r/ulna_r_imu14_-30deg_frame
    IMU ulna_r_imu15_0deg: socket_frame=/bodyset/ulna_r/ulna_r_imu15_0deg_frame
    IMU ulna_r_imu15_30deg: socket_frame=/bodyset/ulna_r/ulna_r_imu15_30deg_frame
    IMU ulna_r_imu15_-30deg: socket_frame=/bodyset/ulna_r/ulna_r_imu15_-30deg_frame
    IMU ulna_r_imu16_0deg: socket_frame=/bodyset/ulna_r/ulna_r_imu16_0deg_frame
    IMU ulna_r_imu16_30deg: socket_frame=/bodyset/ulna_r/ulna_r_imu16_30deg_frame
    IMU ulna_r_imu16_-30deg: socket_frame=/bodyset/ulna_r/ulna_r_imu16_-30deg_frame
    IMU ulna_r_imu17_0deg: socket_frame=/bodyset/ulna_r/ulna_r_imu17_0deg_frame
    IMU ulna_r_imu17_30deg: socket_frame=/bodyset/ulna_r/ulna_r_imu17_30deg_frame
    IMU ulna_r_imu17_-30deg: socket_frame=/bodyset/ulna_r/ulna_r_imu17_-30deg_frame
    IMU ulna_r_imu18_0deg: socket_frame=/bodyset/ulna_r/ulna_r_imu18_0deg_frame
    IMU ulna_r_imu18_30deg: socket_frame=/bodyset/ulna_r/ulna_r_imu18_30deg_frame
    IMU ulna_r_imu18_-30deg: socket_frame=/bodyset/ulna_r/ulna_r_imu18_-30deg_frame
    IMU ulna_r_imu19_0deg: socket_frame=/bodyset/ulna_r/ulna_r_imu19_0deg_frame
    IMU ulna_r_imu19_30deg: socket_frame=/bodyset/ulna_r/ulna_r_imu19_30deg_frame
    IMU ulna_r_imu19_-30deg: socket_frame=/bodyset/ulna_r/ulna_r_imu19_-30deg_frame
    IMU ulna_r_imu20_0deg: socket_frame=/bodyset/ulna_r/ulna_r_imu20_0deg_frame
    IMU ulna_r_imu20_30deg: socket_frame=/bodyset/ulna_r/ulna_r_imu20_30deg_frame
    IMU ulna_r_imu20_-30deg: socket_frame=/bodyset/ulna_r/ulna_r_imu20_-30deg_frame
    IMU ulna_r_imu21_0deg: socket_frame=/bodyset/ulna_r/ulna_r_imu21_0deg_frame
    IMU ulna_r_imu21_30deg: socket_frame=/bodyset/ulna_r/ulna_r_imu21_30deg_frame
    IMU ulna_r_imu21_-30deg: socket_frame=/bodyset/ulna_r/ulna_r_imu21_-30deg_frame
    IMU ulna_r_imu22_0deg: socket_frame=/bodyset/ulna_r/ulna_r_imu22_0deg_frame
    IMU ulna_r_imu22_30deg: socket_frame=/bodyset/ulna_r/ulna_r_imu22_30deg_frame
    IMU ulna_r_imu22_-30deg: socket_frame=/bodyset/ulna_r/ulna_r_imu22_-30deg_frame
    IMU ulna_r_imu23_0deg: socket_frame=/bodyset/ulna_r/ulna_r_imu23_0deg_frame
    IMU ulna_r_imu23_30deg: socket_frame=/bodyset/ulna_r/ulna_r_imu23_30deg_frame
    IMU ulna_r_imu23_-30deg: socket_frame=/bodyset/ulna_r/ulna_r_imu23_-30deg_frame
    IMU ulna_r_imu24_0deg: socket_frame=/bodyset/ulna_r/ulna_r_imu24_0deg_frame
    IMU ulna_r_imu24_30deg: socket_frame=/bodyset/ulna_r/ulna_r_imu24_30deg_frame
    IMU ulna_r_imu24_-30deg: socket_frame=/bodyset/ulna_r/ulna_r_imu24_-30deg_frame
    IMU ulna_r_imu25_0deg: socket_frame=/bodyset/ulna_r/ulna_r_imu25_0deg_frame
    IMU ulna_r_imu25_30deg: socket_frame=/bodyset/ulna_r/ulna_r_imu25_30deg_frame
    IMU ulna_r_imu25_-30deg: socket_frame=/bodyset/ulna_r/ulna_r_imu25_-30deg_frame
    IMU ulna_r_imu26_0deg: socket_frame=/bodyset/ulna_r/ulna_r_imu26_0deg_frame
    IMU ulna_r_imu26_30deg: socket_frame=/bodyset/ulna_r/ulna_r_imu26_30deg_frame
    IMU ulna_r_imu26_-30deg: socket_frame=/bodyset/ulna_r/ulna_r_imu26_-30deg_frame
    IMU ulna_r_imu27_0deg: socket_frame=/bodyset/ulna_r/ulna_r_imu27_0deg_frame
    IMU ulna_r_imu27_30deg: socket_frame=/bodyset/ulna_r/ulna_r_imu27_30deg_frame
    IMU ulna_r_imu27_-30deg: socket_frame=/bodyset/ulna_r/ulna_r_imu27_-30deg_frame
    IMU ulna_r_imu28_0deg: socket_frame=/bodyset/ulna_r/ulna_r_imu28_0deg_frame
    IMU ulna_r_imu28_30deg: socket_frame=/bodyset/ulna_r/ulna_r_imu28_30deg_frame
    IMU ulna_r_imu28_-30deg: socket_frame=/bodyset/ulna_r/ulna_r_imu28_-30deg_frame
    IMU ulna_r_imu29_0deg: socket_frame=/bodyset/ulna_r/ulna_r_imu29_0deg_frame
    IMU ulna_r_imu29_30deg: socket_frame=/bodyset/ulna_r/ulna_r_imu29_30deg_frame
    IMU ulna_r_imu29_-30deg: socket_frame=/bodyset/ulna_r/ulna_r_imu29_-30deg_frame
    IMU ulna_r_imu30_0deg: socket_frame=/bodyset/ulna_r/ulna_r_imu30_0deg_frame
    IMU ulna_r_imu30_30deg: socket_frame=/bodyset/ulna_r/ulna_r_imu30_30deg_frame
    IMU ulna_r_imu30_-30deg: socket_frame=/bodyset/ulna_r/ulna_r_imu30_-30deg_frame
    IMU ulna_r_imu31_0deg: socket_frame=/bodyset/ulna_r/ulna_r_imu31_0deg_frame
    IMU ulna_r_imu31_30deg: socket_frame=/bodyset/ulna_r/ulna_r_imu31_30deg_frame
    IMU ulna_r_imu31_-30deg: socket_frame=/bodyset/ulna_r/ulna_r_imu31_-30deg_frame
    IMU humerus_l_imu2_0deg: socket_frame=/bodyset/humerus_l/humerus_l_imu2_0deg_frame
    IMU humerus_l_imu2_30deg: socket_frame=/bodyset/humerus_l/humerus_l_imu2_30deg_frame
    IMU humerus_l_imu2_-30deg: socket_frame=/bodyset/humerus_l/humerus_l_imu2_-30deg_frame
    IMU humerus_l_imu3_0deg: socket_frame=/bodyset/humerus_l/humerus_l_imu3_0deg_frame
    IMU humerus_l_imu3_30deg: socket_frame=/bodyset/humerus_l/humerus_l_imu3_30deg_frame
    IMU humerus_l_imu3_-30deg: socket_frame=/bodyset/humerus_l/humerus_l_imu3_-30deg_frame
    IMU humerus_l_imu4_0deg: socket_frame=/bodyset/humerus_l/humerus_l_imu4_0deg_frame
    IMU humerus_l_imu4_30deg: socket_frame=/bodyset/humerus_l/humerus_l_imu4_30deg_frame
    IMU humerus_l_imu4_-30deg: socket_frame=/bodyset/humerus_l/humerus_l_imu4_-30deg_frame
    IMU humerus_l_imu5_0deg: socket_frame=/bodyset/humerus_l/humerus_l_imu5_0deg_frame
    IMU humerus_l_imu5_30deg: socket_frame=/bodyset/humerus_l/humerus_l_imu5_30deg_frame
    IMU humerus_l_imu5_-30deg: socket_frame=/bodyset/humerus_l/humerus_l_imu5_-30deg_frame
    IMU humerus_l_imu6_0deg: socket_frame=/bodyset/humerus_l/humerus_l_imu6_0deg_frame
    IMU humerus_l_imu6_30deg: socket_frame=/bodyset/humerus_l/humerus_l_imu6_30deg_frame
    IMU humerus_l_imu6_-30deg: socket_frame=/bodyset/humerus_l/humerus_l_imu6_-30deg_frame
    IMU humerus_l_imu7_0deg: socket_frame=/bodyset/humerus_l/humerus_l_imu7_0deg_frame
    IMU humerus_l_imu7_30deg: socket_frame=/bodyset/humerus_l/humerus_l_imu7_30deg_frame
    IMU humerus_l_imu7_-30deg: socket_frame=/bodyset/humerus_l/humerus_l_imu7_-30deg_frame
    IMU humerus_l_imu8_0deg: socket_frame=/bodyset/humerus_l/humerus_l_imu8_0deg_frame
    IMU humerus_l_imu8_30deg: socket_frame=/bodyset/humerus_l/humerus_l_imu8_30deg_frame
    IMU humerus_l_imu8_-30deg: socket_frame=/bodyset/humerus_l/humerus_l_imu8_-30deg_frame
    IMU humerus_l_imu9_0deg: socket_frame=/bodyset/humerus_l/humerus_l_imu9_0deg_frame
    IMU humerus_l_imu9_30deg: socket_frame=/bodyset/humerus_l/humerus_l_imu9_30deg_frame
    IMU humerus_l_imu9_-30deg: socket_frame=/bodyset/humerus_l/humerus_l_imu9_-30deg_frame
    IMU humerus_l_imu10_0deg: socket_frame=/bodyset/humerus_l/humerus_l_imu10_0deg_frame
    IMU humerus_l_imu10_30deg: socket_frame=/bodyset/humerus_l/humerus_l_imu10_30deg_frame
    IMU humerus_l_imu10_-30deg: socket_frame=/bodyset/humerus_l/humerus_l_imu10_-30deg_frame
    IMU humerus_l_imu11_0deg: socket_frame=/bodyset/humerus_l/humerus_l_imu11_0deg_frame
    IMU humerus_l_imu11_30deg: socket_frame=/bodyset/humerus_l/humerus_l_imu11_30deg_frame
    IMU humerus_l_imu11_-30deg: socket_frame=/bodyset/humerus_l/humerus_l_imu11_-30deg_frame
    IMU humerus_l_imu12_0deg: socket_frame=/bodyset/humerus_l/humerus_l_imu12_0deg_frame
    IMU humerus_l_imu12_30deg: socket_frame=/bodyset/humerus_l/humerus_l_imu12_30deg_frame
    IMU humerus_l_imu12_-30deg: socket_frame=/bodyset/humerus_l/humerus_l_imu12_-30deg_frame
    IMU humerus_l_imu13_0deg: socket_frame=/bodyset/humerus_l/humerus_l_imu13_0deg_frame
    IMU humerus_l_imu13_30deg: socket_frame=/bodyset/humerus_l/humerus_l_imu13_30deg_frame
    IMU humerus_l_imu13_-30deg: socket_frame=/bodyset/humerus_l/humerus_l_imu13_-30deg_frame
    IMU humerus_l_imu14_0deg: socket_frame=/bodyset/humerus_l/humerus_l_imu14_0deg_frame
    IMU humerus_l_imu14_30deg: socket_frame=/bodyset/humerus_l/humerus_l_imu14_30deg_frame
    IMU humerus_l_imu14_-30deg: socket_frame=/bodyset/humerus_l/humerus_l_imu14_-30deg_frame
    IMU humerus_l_imu15_0deg: socket_frame=/bodyset/humerus_l/humerus_l_imu15_0deg_frame
    IMU humerus_l_imu15_30deg: socket_frame=/bodyset/humerus_l/humerus_l_imu15_30deg_frame
    IMU humerus_l_imu15_-30deg: socket_frame=/bodyset/humerus_l/humerus_l_imu15_-30deg_frame
    IMU humerus_l_imu16_0deg: socket_frame=/bodyset/humerus_l/humerus_l_imu16_0deg_frame
    IMU humerus_l_imu16_30deg: socket_frame=/bodyset/humerus_l/humerus_l_imu16_30deg_frame
    IMU humerus_l_imu16_-30deg: socket_frame=/bodyset/humerus_l/humerus_l_imu16_-30deg_frame
    IMU humerus_l_imu17_0deg: socket_frame=/bodyset/humerus_l/humerus_l_imu17_0deg_frame
    IMU humerus_l_imu17_30deg: socket_frame=/bodyset/humerus_l/humerus_l_imu17_30deg_frame
    IMU humerus_l_imu17_-30deg: socket_frame=/bodyset/humerus_l/humerus_l_imu17_-30deg_frame
    IMU humerus_l_imu18_0deg: socket_frame=/bodyset/humerus_l/humerus_l_imu18_0deg_frame
    IMU humerus_l_imu18_30deg: socket_frame=/bodyset/humerus_l/humerus_l_imu18_30deg_frame
    IMU humerus_l_imu18_-30deg: socket_frame=/bodyset/humerus_l/humerus_l_imu18_-30deg_frame
    IMU humerus_l_imu19_0deg: socket_frame=/bodyset/humerus_l/humerus_l_imu19_0deg_frame
    IMU humerus_l_imu19_30deg: socket_frame=/bodyset/humerus_l/humerus_l_imu19_30deg_frame
    IMU humerus_l_imu19_-30deg: socket_frame=/bodyset/humerus_l/humerus_l_imu19_-30deg_frame
    IMU humerus_l_imu20_0deg: socket_frame=/bodyset/humerus_l/humerus_l_imu20_0deg_frame
    IMU humerus_l_imu20_30deg: socket_frame=/bodyset/humerus_l/humerus_l_imu20_30deg_frame
    IMU humerus_l_imu20_-30deg: socket_frame=/bodyset/humerus_l/humerus_l_imu20_-30deg_frame
    IMU humerus_l_imu21_0deg: socket_frame=/bodyset/humerus_l/humerus_l_imu21_0deg_frame
    IMU humerus_l_imu21_30deg: socket_frame=/bodyset/humerus_l/humerus_l_imu21_30deg_frame
    IMU humerus_l_imu21_-30deg: socket_frame=/bodyset/humerus_l/humerus_l_imu21_-30deg_frame
    IMU humerus_l_imu22_0deg: socket_frame=/bodyset/humerus_l/humerus_l_imu22_0deg_frame
    IMU humerus_l_imu22_30deg: socket_frame=/bodyset/humerus_l/humerus_l_imu22_30deg_frame
    IMU humerus_l_imu22_-30deg: socket_frame=/bodyset/humerus_l/humerus_l_imu22_-30deg_frame
    IMU humerus_l_imu23_0deg: socket_frame=/bodyset/humerus_l/humerus_l_imu23_0deg_frame
    IMU humerus_l_imu23_30deg: socket_frame=/bodyset/humerus_l/humerus_l_imu23_30deg_frame
    IMU humerus_l_imu23_-30deg: socket_frame=/bodyset/humerus_l/humerus_l_imu23_-30deg_frame
    IMU humerus_l_imu24_0deg: socket_frame=/bodyset/humerus_l/humerus_l_imu24_0deg_frame
    IMU humerus_l_imu24_30deg: socket_frame=/bodyset/humerus_l/humerus_l_imu24_30deg_frame
    IMU humerus_l_imu24_-30deg: socket_frame=/bodyset/humerus_l/humerus_l_imu24_-30deg_frame
    IMU humerus_l_imu25_0deg: socket_frame=/bodyset/humerus_l/humerus_l_imu25_0deg_frame
    IMU humerus_l_imu25_30deg: socket_frame=/bodyset/humerus_l/humerus_l_imu25_30deg_frame
    IMU humerus_l_imu25_-30deg: socket_frame=/bodyset/humerus_l/humerus_l_imu25_-30deg_frame
    IMU humerus_l_imu26_0deg: socket_frame=/bodyset/humerus_l/humerus_l_imu26_0deg_frame
    IMU humerus_l_imu26_30deg: socket_frame=/bodyset/humerus_l/humerus_l_imu26_30deg_frame
    IMU humerus_l_imu26_-30deg: socket_frame=/bodyset/humerus_l/humerus_l_imu26_-30deg_frame
    IMU humerus_l_imu27_0deg: socket_frame=/bodyset/humerus_l/humerus_l_imu27_0deg_frame
    IMU humerus_l_imu27_30deg: socket_frame=/bodyset/humerus_l/humerus_l_imu27_30deg_frame
    IMU humerus_l_imu27_-30deg: socket_frame=/bodyset/humerus_l/humerus_l_imu27_-30deg_frame
    IMU humerus_l_imu28_0deg: socket_frame=/bodyset/humerus_l/humerus_l_imu28_0deg_frame
    IMU humerus_l_imu28_30deg: socket_frame=/bodyset/humerus_l/humerus_l_imu28_30deg_frame
    IMU humerus_l_imu28_-30deg: socket_frame=/bodyset/humerus_l/humerus_l_imu28_-30deg_frame
    IMU humerus_l_imu29_0deg: socket_frame=/bodyset/humerus_l/humerus_l_imu29_0deg_frame
    IMU humerus_l_imu29_30deg: socket_frame=/bodyset/humerus_l/humerus_l_imu29_30deg_frame
    IMU humerus_l_imu29_-30deg: socket_frame=/bodyset/humerus_l/humerus_l_imu29_-30deg_frame
    IMU humerus_l_imu30_0deg: socket_frame=/bodyset/humerus_l/humerus_l_imu30_0deg_frame
    IMU humerus_l_imu30_30deg: socket_frame=/bodyset/humerus_l/humerus_l_imu30_30deg_frame
    IMU humerus_l_imu30_-30deg: socket_frame=/bodyset/humerus_l/humerus_l_imu30_-30deg_frame
    IMU humerus_l_imu31_0deg: socket_frame=/bodyset/humerus_l/humerus_l_imu31_0deg_frame
    IMU humerus_l_imu31_30deg: socket_frame=/bodyset/humerus_l/humerus_l_imu31_30deg_frame
    IMU humerus_l_imu31_-30deg: socket_frame=/bodyset/humerus_l/humerus_l_imu31_-30deg_frame
    IMU humerus_r_imu2_0deg: socket_frame=/bodyset/humerus_r/humerus_r_imu2_0deg_frame
    IMU humerus_r_imu2_30deg: socket_frame=/bodyset/humerus_r/humerus_r_imu2_30deg_frame
    IMU humerus_r_imu2_-30deg: socket_frame=/bodyset/humerus_r/humerus_r_imu2_-30deg_frame
    IMU humerus_r_imu3_0deg: socket_frame=/bodyset/humerus_r/humerus_r_imu3_0deg_frame
    IMU humerus_r_imu3_30deg: socket_frame=/bodyset/humerus_r/humerus_r_imu3_30deg_frame
    IMU humerus_r_imu3_-30deg: socket_frame=/bodyset/humerus_r/humerus_r_imu3_-30deg_frame
    IMU humerus_r_imu4_0deg: socket_frame=/bodyset/humerus_r/humerus_r_imu4_0deg_frame
    IMU humerus_r_imu4_30deg: socket_frame=/bodyset/humerus_r/humerus_r_imu4_30deg_frame
    IMU humerus_r_imu4_-30deg: socket_frame=/bodyset/humerus_r/humerus_r_imu4_-30deg_frame
    IMU humerus_r_imu5_0deg: socket_frame=/bodyset/humerus_r/humerus_r_imu5_0deg_frame
    IMU humerus_r_imu5_30deg: socket_frame=/bodyset/humerus_r/humerus_r_imu5_30deg_frame
    IMU humerus_r_imu5_-30deg: socket_frame=/bodyset/humerus_r/humerus_r_imu5_-30deg_frame
    IMU humerus_r_imu6_0deg: socket_frame=/bodyset/humerus_r/humerus_r_imu6_0deg_frame
    IMU humerus_r_imu6_30deg: socket_frame=/bodyset/humerus_r/humerus_r_imu6_30deg_frame
    IMU humerus_r_imu6_-30deg: socket_frame=/bodyset/humerus_r/humerus_r_imu6_-30deg_frame
    IMU humerus_r_imu7_0deg: socket_frame=/bodyset/humerus_r/humerus_r_imu7_0deg_frame
    IMU humerus_r_imu7_30deg: socket_frame=/bodyset/humerus_r/humerus_r_imu7_30deg_frame
    IMU humerus_r_imu7_-30deg: socket_frame=/bodyset/humerus_r/humerus_r_imu7_-30deg_frame
    IMU humerus_r_imu8_0deg: socket_frame=/bodyset/humerus_r/humerus_r_imu8_0deg_frame
    IMU humerus_r_imu8_30deg: socket_frame=/bodyset/humerus_r/humerus_r_imu8_30deg_frame
    IMU humerus_r_imu8_-30deg: socket_frame=/bodyset/humerus_r/humerus_r_imu8_-30deg_frame
    IMU humerus_r_imu9_0deg: socket_frame=/bodyset/humerus_r/humerus_r_imu9_0deg_frame
    IMU humerus_r_imu9_30deg: socket_frame=/bodyset/humerus_r/humerus_r_imu9_30deg_frame
    IMU humerus_r_imu9_-30deg: socket_frame=/bodyset/humerus_r/humerus_r_imu9_-30deg_frame
    IMU humerus_r_imu10_0deg: socket_frame=/bodyset/humerus_r/humerus_r_imu10_0deg_frame
    IMU humerus_r_imu10_30deg: socket_frame=/bodyset/humerus_r/humerus_r_imu10_30deg_frame
    IMU humerus_r_imu10_-30deg: socket_frame=/bodyset/humerus_r/humerus_r_imu10_-30deg_frame
    IMU humerus_r_imu11_0deg: socket_frame=/bodyset/humerus_r/humerus_r_imu11_0deg_frame
    IMU humerus_r_imu11_30deg: socket_frame=/bodyset/humerus_r/humerus_r_imu11_30deg_frame
    IMU humerus_r_imu11_-30deg: socket_frame=/bodyset/humerus_r/humerus_r_imu11_-30deg_frame
    IMU humerus_r_imu12_0deg: socket_frame=/bodyset/humerus_r/humerus_r_imu12_0deg_frame
    IMU humerus_r_imu12_30deg: socket_frame=/bodyset/humerus_r/humerus_r_imu12_30deg_frame
    IMU humerus_r_imu12_-30deg: socket_frame=/bodyset/humerus_r/humerus_r_imu12_-30deg_frame
    IMU humerus_r_imu13_0deg: socket_frame=/bodyset/humerus_r/humerus_r_imu13_0deg_frame
    IMU humerus_r_imu13_30deg: socket_frame=/bodyset/humerus_r/humerus_r_imu13_30deg_frame
    IMU humerus_r_imu13_-30deg: socket_frame=/bodyset/humerus_r/humerus_r_imu13_-30deg_frame
    IMU humerus_r_imu14_0deg: socket_frame=/bodyset/humerus_r/humerus_r_imu14_0deg_frame
    IMU humerus_r_imu14_30deg: socket_frame=/bodyset/humerus_r/humerus_r_imu14_30deg_frame
    IMU humerus_r_imu14_-30deg: socket_frame=/bodyset/humerus_r/humerus_r_imu14_-30deg_frame
    IMU humerus_r_imu15_0deg: socket_frame=/bodyset/humerus_r/humerus_r_imu15_0deg_frame
    IMU humerus_r_imu15_30deg: socket_frame=/bodyset/humerus_r/humerus_r_imu15_30deg_frame
    IMU humerus_r_imu15_-30deg: socket_frame=/bodyset/humerus_r/humerus_r_imu15_-30deg_frame
    IMU humerus_r_imu16_0deg: socket_frame=/bodyset/humerus_r/humerus_r_imu16_0deg_frame
    IMU humerus_r_imu16_30deg: socket_frame=/bodyset/humerus_r/humerus_r_imu16_30deg_frame
    IMU humerus_r_imu16_-30deg: socket_frame=/bodyset/humerus_r/humerus_r_imu16_-30deg_frame
    IMU humerus_r_imu17_0deg: socket_frame=/bodyset/humerus_r/humerus_r_imu17_0deg_frame
    IMU humerus_r_imu17_30deg: socket_frame=/bodyset/humerus_r/humerus_r_imu17_30deg_frame
    IMU humerus_r_imu17_-30deg: socket_frame=/bodyset/humerus_r/humerus_r_imu17_-30deg_frame
    IMU humerus_r_imu18_0deg: socket_frame=/bodyset/humerus_r/humerus_r_imu18_0deg_frame
    IMU humerus_r_imu18_30deg: socket_frame=/bodyset/humerus_r/humerus_r_imu18_30deg_frame
    IMU humerus_r_imu18_-30deg: socket_frame=/bodyset/humerus_r/humerus_r_imu18_-30deg_frame
    IMU humerus_r_imu19_0deg: socket_frame=/bodyset/humerus_r/humerus_r_imu19_0deg_frame
    IMU humerus_r_imu19_30deg: socket_frame=/bodyset/humerus_r/humerus_r_imu19_30deg_frame
    IMU humerus_r_imu19_-30deg: socket_frame=/bodyset/humerus_r/humerus_r_imu19_-30deg_frame
    IMU humerus_r_imu20_0deg: socket_frame=/bodyset/humerus_r/humerus_r_imu20_0deg_frame
    IMU humerus_r_imu20_30deg: socket_frame=/bodyset/humerus_r/humerus_r_imu20_30deg_frame
    IMU humerus_r_imu20_-30deg: socket_frame=/bodyset/humerus_r/humerus_r_imu20_-30deg_frame
    IMU humerus_r_imu21_0deg: socket_frame=/bodyset/humerus_r/humerus_r_imu21_0deg_frame
    IMU humerus_r_imu21_30deg: socket_frame=/bodyset/humerus_r/humerus_r_imu21_30deg_frame
    IMU humerus_r_imu21_-30deg: socket_frame=/bodyset/humerus_r/humerus_r_imu21_-30deg_frame
    IMU humerus_r_imu22_0deg: socket_frame=/bodyset/humerus_r/humerus_r_imu22_0deg_frame
    IMU humerus_r_imu22_30deg: socket_frame=/bodyset/humerus_r/humerus_r_imu22_30deg_frame
    IMU humerus_r_imu22_-30deg: socket_frame=/bodyset/humerus_r/humerus_r_imu22_-30deg_frame
    IMU humerus_r_imu23_0deg: socket_frame=/bodyset/humerus_r/humerus_r_imu23_0deg_frame
    IMU humerus_r_imu23_30deg: socket_frame=/bodyset/humerus_r/humerus_r_imu23_30deg_frame
    IMU humerus_r_imu23_-30deg: socket_frame=/bodyset/humerus_r/humerus_r_imu23_-30deg_frame
    IMU humerus_r_imu24_0deg: socket_frame=/bodyset/humerus_r/humerus_r_imu24_0deg_frame
    IMU humerus_r_imu24_30deg: socket_frame=/bodyset/humerus_r/humerus_r_imu24_30deg_frame
    IMU humerus_r_imu24_-30deg: socket_frame=/bodyset/humerus_r/humerus_r_imu24_-30deg_frame
    IMU humerus_r_imu25_0deg: socket_frame=/bodyset/humerus_r/humerus_r_imu25_0deg_frame
    IMU humerus_r_imu25_30deg: socket_frame=/bodyset/humerus_r/humerus_r_imu25_30deg_frame
    IMU humerus_r_imu25_-30deg: socket_frame=/bodyset/humerus_r/humerus_r_imu25_-30deg_frame
    IMU humerus_r_imu26_0deg: socket_frame=/bodyset/humerus_r/humerus_r_imu26_0deg_frame
    IMU humerus_r_imu26_30deg: socket_frame=/bodyset/humerus_r/humerus_r_imu26_30deg_frame
    IMU humerus_r_imu26_-30deg: socket_frame=/bodyset/humerus_r/humerus_r_imu26_-30deg_frame
    IMU humerus_r_imu27_0deg: socket_frame=/bodyset/humerus_r/humerus_r_imu27_0deg_frame
    IMU humerus_r_imu27_30deg: socket_frame=/bodyset/humerus_r/humerus_r_imu27_30deg_frame
    IMU humerus_r_imu27_-30deg: socket_frame=/bodyset/humerus_r/humerus_r_imu27_-30deg_frame
    IMU humerus_r_imu28_0deg: socket_frame=/bodyset/humerus_r/humerus_r_imu28_0deg_frame
    IMU humerus_r_imu28_30deg: socket_frame=/bodyset/humerus_r/humerus_r_imu28_30deg_frame
    IMU humerus_r_imu28_-30deg: socket_frame=/bodyset/humerus_r/humerus_r_imu28_-30deg_frame
    IMU humerus_r_imu29_0deg: socket_frame=/bodyset/humerus_r/humerus_r_imu29_0deg_frame
    IMU humerus_r_imu29_30deg: socket_frame=/bodyset/humerus_r/humerus_r_imu29_30deg_frame
    IMU humerus_r_imu29_-30deg: socket_frame=/bodyset/humerus_r/humerus_r_imu29_-30deg_frame
    IMU humerus_r_imu30_0deg: socket_frame=/bodyset/humerus_r/humerus_r_imu30_0deg_frame
    IMU humerus_r_imu30_30deg: socket_frame=/bodyset/humerus_r/humerus_r_imu30_30deg_frame
    IMU humerus_r_imu30_-30deg: socket_frame=/bodyset/humerus_r/humerus_r_imu30_-30deg_frame
    IMU humerus_r_imu31_0deg: socket_frame=/bodyset/humerus_r/humerus_r_imu31_0deg_frame
    IMU humerus_r_imu31_30deg: socket_frame=/bodyset/humerus_r/humerus_r_imu31_30deg_frame
    IMU humerus_r_imu31_-30deg: socket_frame=/bodyset/humerus_r/humerus_r_imu31_-30deg_frame
